# OpenSim document version 40000
Model 3DUpperLimbModel:
  gravity: 0 -9.80665 0
  credits: Dimitar Stanev
  length_units: meters
  force_units: N
  defaults: Thelen2003Muscle default: max_isometric_force=546 optimal_fiber_length=0.0535 tendon_slack_length=0.078
      pennation_angle_at_optimal=0 [radians] FmaxTendonStrain=0.033 FmaxMuscleStrain=0.6 KshapeActive=0.5
      KshapePassive=4 Af=0.3 Flen=1.8 activation_time_constant=0.01 [seconds] deactivation_time_constant=0.04 [seconds]
  Ground
  BodySet:
    Body torso: mass=26.8266 [kg] mass_center=(-0.03 0.32 0) inertia=(1.4745 0.7555 1.4314 0 0 0)
        meshes=(hat_spine.vtp hat_jaw.vtp hat_skull.vtp hat_ribs_scap.stl)
      PhysicalOffsetFrame torso_imu: socket_parent=.. translation=(0.08 0.25 0) [meters]
          orientation=(-1.5708 1.3 0) [radians] meshes=ngimu_body.obj
      WrapEllipsoid TRIlonghh: xyz_body_rotation=(3.00162 -0.853466 2.57419) translation=(-0.0078 0.36 0.17) quadrant=z
          dimensions=(0.035 0.02 0.02)
      WrapCylinder TRIlongglen: xyz_body_rotation=(1.37532 -0.294612 2.43596) translation=(-0.013905 0.36 0.1478)
          quadrant=x radius=0.003 length=0.03
    Body humerus_r: mass=2.0325 mass_center=(0 -0.164502 0) inertia=(0.011946 0.004121 0.013409 0 0 0)
        meshes=humerus_rv.vtp
      PhysicalOffsetFrame humerus_r_imu: socket_parent=.. translation=(0.01 -0.18 0.04) orientation=(0 0 -1.5708)
          meshes=ngimu_body.obj
      WrapEllipsoid BIClonghh: xyz_body_rotation=(-2.00434 -1.00164 0.975465) translation=(0.0033 0.0073 0.0003)
          quadrant=-y dimensions=(0.025 0.02 0.02)
      WrapCylinder TRI: xyz_body_rotation=(-0.14015 -0.00628319 0.154985) translation=(0.0035 -0.2919 -0.005)
          quadrant=all radius=0.016 length=0.05
      WrapEllipsoid Elbow_PT_ECRL: xyz_body_rotation=(-0.161094 -0.110828 0.61453) translation=(0.003 -0.2872 -0.0069)
          quadrant=x dimensions=(0.018 0.025 0.035)
      WrapEllipsoid Elbow_BIC_BRD: xyz_body_rotation=(-0.128631 0.137532 0.0307178) translation=(0.0019 -0.289 -0.014)
          quadrant=x dimensions=(0.015 0.015 0.1)
    Body ulna_r: mass=0.6075 mass_center=(0 -0.120525 0) inertia=(0.002962 0.000618 0.003213 0 0 0) meshes=ulna_rv.vtp
    Body radius_r: mass=0.6075 mass_center=(0 -0.120525 0) inertia=(0.002962 0.000618 0.003213 0 0 0)
        meshes=radius_rv.vtp
      PhysicalOffsetFrame radius_r_imu: socket_parent=.. translation=(-0.025 -0.15 0.005)
          orientation=(-0.15 -1.5708 -1.5708) meshes=ngimu_body.obj
    Body hand_r: mass=0.4575 mass_center=(0 -0.068095 0) inertia=(0.000892 0.000547 0.00134 0 0 0)
        meshes=(pisiform_rvs.vtp lunate_rvs.vtp scaphoid_rvs.vtp triquetrum_rvs.vtp hamate_rvs.vtp capitate_rvs.vtp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)
      PhysicalOffsetFrame hand_r_imu: socket_parent=.. translation=(-0.02 -0.05 0)
          orientation=(-1.57079 -1.57079 -3.14159) meshes=ngimu_body.obj
    Body humerus_l: mass=2.0325 mass_center=(0 -0.164502 0) inertia=(0.011946 0.004121 0.013409 0 0 0)
        meshes=humerus_lv.vtp
      PhysicalOffsetFrame humerus_l_imu: socket_parent=.. translation=(0.01 -0.18 -0.04)
          orientation=(3.14159 0 1.57079) meshes=ngimu_body.obj
    Body ulna_l: mass=0.6075 mass_center=(0 -0.120525 0) inertia=(0.002962 0.000618 0.003213 0 0 0) meshes=ulna_lv.vtp
    Body radius_l: mass=0.6075 mass_center=(0 -0.120525 0) inertia=(0.002962 0.000618 0.003213 0 0 0)
        meshes=radius_lv.vtp
      PhysicalOffsetFrame radius_l_imu: socket_parent=.. translation=(-0.025 -0.15 -0.001)
          orientation=(3.14 -1.57079 1.57079) meshes=ngimu_body.obj
    Body hand_l: mass=0.4575 mass_center=(0 -0.068095 0) inertia=(0.000892 0.000547 0.00134 0 0 0)
        meshes=(pisiform_lvs.vtp lunate_lvs.vtp scaphoid_lvs.vtp triquetrum_lvs.vtp hamate_lvs.vtp capitate_lvs.vtp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)
      PhysicalOffsetFrame hand_l_imu: socket_parent=.. translation=(-0.02 -0.05 0)
          orientation=(-1.57079 -1.57079 -3.14) meshes=ngimu_body.obj
  JointSet:
    CustomJoint back: socket_parent_frame=ground_offset socket_child_frame=torso_offset
      Coordinate torso_tilt: default_value=0 range=(-1.570796 1.570796) clamped=false
      Coordinate torso_list: default_value=0 range=(-1.570796 1.570796) clamped=true
      Coordinate torso_rotation: default_value=0 range=(-1.570796 1.570796) clamped=true
      Coordinate torso_tx: default_value=0 range=(-5 5) clamped=true locked=true
      Coordinate torso_ty: default_value=0 range=(-1 2) clamped=true locked=true
      Coordinate torso_tz: default_value=0 range=(-3 3) clamped=true locked=true
      PhysicalOffsetFrame ground_offset: socket_parent=/ground translation=(-0.1007 0.0815 0)
      PhysicalOffsetFrame torso_offset: socket_parent=/bodyset/torso translation=(0 0 0)
      SpatialTransform:
        TransformAxis rotation1: coordinates=torso_tilt axis=(0 0 1) LinearFunction(coefficients=1 0)
        TransformAxis rotation2: coordinates=torso_list axis=(1 0 0) LinearFunction(coefficients=1 0)
        TransformAxis rotation3: coordinates=torso_rotation axis=(0 1 0) LinearFunction(coefficients=1 0)
        TransformAxis translation1: coordinates=torso_tx axis=(1 0 0) LinearFunction(coefficients=1 0)
        TransformAxis translation2: coordinates=torso_ty axis=(0 1 0) LinearFunction(coefficients=1 0)
        TransformAxis translation3: coordinates=torso_tz axis=(0 0 1) LinearFunction(coefficients=1 0)
    CustomJoint acromial_r: socket_parent_frame=torso_offset socket_child_frame=humerus_r_offset
      Coordinate arm_flex_r: default_value=0 range=(-1.570796 3.141593) clamped=true
      Coordinate arm_add_r: default_value=-1.570796 range=(-3.141593 1.570796) clamped=true
      Coordinate arm_rot_r: default_value=0 range=(-1.570796 1.570796) clamped=true
      PhysicalOffsetFrame torso_offset: socket_parent=/bodyset/torso translation=(0.003155 0.3715 0.17)
      PhysicalOffsetFrame humerus_r_offset: socket_parent=/bodyset/humerus_r translation=(0 0 0)
      SpatialTransform: axes_held_at_zero=(translation1 translation2 translation3)
        TransformAxis rotation1: coordinates=arm_flex_r axis=(0 0 1) LinearFunction(coefficients=1 0)
        TransformAxis rotation2: coordinates=arm_add_r axis=(1 0 0) LinearFunction(coefficients=1 0)
        TransformAxis rotation3: coordinates=arm_rot_r axis=(0 1 0) LinearFunction(coefficients=1 0)
    CustomJoint elbow_r: socket_parent_frame=humerus_r_offset socket_child_frame=ulna_r_offset
      Coordinate elbow_flex_r: default_value=0 range=(0 2.618) clamped=true
      PhysicalOffsetFrame humerus_r_offset: socket_parent=/bodyset/humerus_r translation=(0.013144 -0.286273 -0.009595)
      PhysicalOffsetFrame ulna_r_offset: socket_parent=/bodyset/ulna_r translation=(0 0 0)
      SpatialTransform: axes_held_at_zero=(rotation2 rotation3 translation1 translation2 translation3)
        TransformAxis rotation1: coordinates=elbow_flex_r axis=(0.226047 0.022269 0.9738618)
            LinearFunction(coefficients=1 0)
    CustomJoint radioulnar_r: socket_parent_frame=ulna_r_offset socket_child_frame=radius_r_offset
      Coordinate pro_sup_r: default_value=1.570796 range=(0 2.094395) clamped=true
      PhysicalOffsetFrame ulna_r_offset: socket_parent=/bodyset/ulna_r translation=(-0.006727 -0.013007 0.026083)
      PhysicalOffsetFrame radius_r_offset: socket_parent=/bodyset/radius_r translation=(0 0 0)
      SpatialTransform: axes_held_at_zero=(rotation2 rotation3 translation1 translation2 translation3)
        TransformAxis rotation1: coordinates=pro_sup_r axis=(0.05639803 0.9984065 0.001952)
            LinearFunction(coefficients=1 0)
    CustomJoint radius_hand_r: socket_parent_frame=radius_r_offset socket_child_frame=hand_r_offset
      Coordinate wrist_flex_r: default_value=0 range=(-1.22173 1.22173) clamped=true
      Coordinate wrist_dev_r: default_value=0 range=(-0.4363323 0.6108652) clamped=true
      PhysicalOffsetFrame radius_r_offset: socket_parent=/bodyset/radius_r translation=(-0.008797 -0.235841 0.01361)
      PhysicalOffsetFrame hand_r_offset: socket_parent=/bodyset/hand_r translation=(0 0 0)
      SpatialTransform: axes_held_at_zero=(rotation3 translation1 translation2 translation3)
        TransformAxis rotation1: coordinates=wrist_flex_r axis=(0 0 1) LinearFunction(coefficients=1 0)
        TransformAxis rotation2: coordinates=wrist_dev_r axis=(1 0 0) LinearFunction(coefficients=1 0)
    CustomJoint acromial_l: socket_parent_frame=torso_offset socket_child_frame=humerus_l_offset
      Coordinate arm_flex_l: default_value=0 range=(-1.570796 3.141593) clamped=true
      Coordinate arm_add_l: default_value=-1.570796 range=(-3.141593 1.570796) clamped=true
      Coordinate arm_rot_l: default_value=0 range=(-1.570796 1.570796) clamped=true
      PhysicalOffsetFrame torso_offset: socket_parent=/bodyset/torso translation=(0.003155 0.3715 -0.17)
      PhysicalOffsetFrame humerus_l_offset: socket_parent=/bodyset/humerus_l translation=(0 0 0)
      SpatialTransform: axes_held_at_zero=(translation1 translation2 translation3)
        TransformAxis rotation1: coordinates=arm_flex_l axis=(0 0 1) LinearFunction(coefficients=1 0)
        TransformAxis rotation2: coordinates=arm_add_l axis=(-1 0 0) LinearFunction(coefficients=1 0)
        TransformAxis rotation3: coordinates=arm_rot_l axis=(0 -1 0) LinearFunction(coefficients=1 0)
    CustomJoint elbow_l: socket_parent_frame=humerus_l_offset socket_child_frame=ulna_l_offset
      Coordinate elbow_flex_l: default_value=0 range=(0 2.618) clamped=true
      PhysicalOffsetFrame humerus_l_offset: socket_parent=/bodyset/humerus_l translation=(0.013144 -0.286273 0.009595)
      PhysicalOffsetFrame ulna_l_offset: socket_parent=/bodyset/ulna_l translation=(0 0 0)
      SpatialTransform: axes_held_at_zero=(rotation2 rotation3 translation1 translation2 translation3)
        TransformAxis rotation1: coordinates=elbow_flex_l axis=(-0.226047 -0.022269 0.9738618)
            LinearFunction(coefficients=1 0)
    CustomJoint radioulnar_l: socket_parent_frame=ulna_l_offset socket_child_frame=radius_l_offset
      Coordinate pro_sup_l: default_value=1.570796 range=(0 2.094395) clamped=true
      PhysicalOffsetFrame ulna_l_offset: socket_parent=/bodyset/ulna_l translation=(-0.006727 -0.013007 -0.026083)
      PhysicalOffsetFrame radius_l_offset: socket_parent=/bodyset/radius_l translation=(0 0 0)
      SpatialTransform: axes_held_at_zero=(rotation2 rotation3 translation1 translation2 translation3)
        TransformAxis rotation1: coordinates=pro_sup_l axis=(-0.05639803 -0.9984065 0.001952)
            LinearFunction(coefficients=1 0)
    CustomJoint radius_hand_l: socket_parent_frame=radius_l_offset socket_child_frame=hand_l_offset
      Coordinate wrist_flex_l: default_value=0 range=(-1.22173 1.22173) clamped=true
      Coordinate wrist_dev_l: default_value=0 range=(-0.4363323 0.6108652) clamped=true
      PhysicalOffsetFrame radius_l_offset: socket_parent=/bodyset/radius_l translation=(-0.008797 -0.235841 -0.01361)
      PhysicalOffsetFrame hand_l_offset: socket_parent=/bodyset/hand_l translation=(0 0 0)
      SpatialTransform: axes_held_at_zero=(rotation3 translation1 translation2 translation3)
        TransformAxis rotation1: coordinates=wrist_flex_l axis=(0 0 1) LinearFunction(coefficients=1 0)
        TransformAxis rotation2: coordinates=wrist_dev_l axis=(-1 0 0) LinearFunction(coefficients=1 0)
  ForceSet:
    Thelen2003Muscle BIClong: optimal_force=1 max_isometric_force=624.3 optimal_fiber_length=0.1157
        tendon_slack_length=0.2723 pennation_angle_at_optimal=0 max_contraction_velocity=10 FmaxTendonStrain=0.033
        FmaxMuscleStrain=0.6 KshapeActive=0.5 KshapePassive=4 Af=0.3 Flen=1.8 activation_time_constant=0.01
        deactivation_time_constant=0.04
      PathPoint P1: torso (0 0.39 0.15056)
      PathPoint P2: torso (0 0.4 0.15639)
      PathPoint P3: humerus_r (0.02131 0.018 0.01028)
      PathPoint P4: humerus_r (0.02378 -0.00511 0.01201)
      PathPoint P5: humerus_r (0.01345 -0.02827 0.00136)
      PathPoint P6: humerus_r (0.01068 -0.07736 -0.00165)
      PathPoint P7: humerus_r (0.01703 -0.12125 0.00024)
      PathPoint P8: humerus_r (0.0228 -0.1754 -0.0063)
      PathPoint P9: ulna_r (-4.49708e-5 -0.0452882 0.0281659)
      PathWrap: wrap_object=BIClonghh method=hybrid range=(2 3)
      PathWrap pathwrap_0: wrap_object=TRI method=hybrid range=(8 9)
    Thelen2003Muscle TRIlong: optimal_force=1 max_isometric_force=798.52 optimal_fiber_length=0.134
        tendon_slack_length=0.143 pennation_angle_at_optimal=0.2094395 max_contraction_velocity=10
        FmaxTendonStrain=0.033 FmaxMuscleStrain=0.6 KshapeActive=0.5 KshapePassive=4 Af=0.3 Flen=1.8
        activation_time_constant=0.01 deactivation_time_constant=0.04
      PathPoint P1: torso (-0.0234111 0.384123 0.154223)
      PathPoint P2: humerus_r (-0.02714 -0.11441 -0.00664)
      PathPoint P3: humerus_r (-0.03184 -0.22637 -0.01217)
      PathPoint P4: humerus_r (-0.0191464 -0.275554 -0.0127229)
      PathPoint P5: ulna_r (-0.0297364 0.00922285 -0.00548032)
      PathWrap: wrap_object=TRI method=hybrid
      PathWrap pathwrap_0: wrap_object=TRIlonghh method=hybrid
      PathWrap pathwrap_1: wrap_object=TRIlongglen method=hybrid
    Schutte1993Muscle_Deprecated PT: max_isometric_force=566.22 optimal_fiber_length=0.0492 tendon_slack_length=0.098
        pennation_angle_at_optimal=0.1745329 [radians]
      PathPoint P1: humerus_r (0.0036 -0.2759 -0.0365)
      PathPoint P2: ulna_r (0.00846 -0.03373 -0.01432)
      PathPoint P3: ulna_r (0.0124861 -0.0601881 0.00285469)
      ConditionalPathPoint P4: radius_r (0.017001 -0.0908868 0.00991144)
          socket_coordinate=/jointset/radioulnar_r/pro_sup_r range=(-1.5708 0.509636) [radians]
      PathPoint P5: radius_r (0.00671286 -0.106355 0.0237522)
      PathWrap: wrap_object=Elbow_PT_ECRL method=hybrid
    Schutte1993Muscle_Deprecated BRD: max_isometric_force=261.33 optimal_fiber_length=0.1726 tendon_slack_length=0.133
        pennation_angle_at_optimal=0
      PathPoint P1: humerus_r (-0.00459195 -0.198041 0.0102188)
      PathPoint P2: radius_r (0.00557363 -0.124053 0.0327071)
      PathPoint P3: radius_r (-0.00155199 -0.220757 0.03554)
      PathWrap: wrap_object=Elbow_BIC_BRD method=hybrid
