# OpenSim document version 40000
Model MoBL_ARMS_Upper_Limb_Model_OpenSim:
  gravity: 0 -9.80665 0
  publications: Comp Meth Biomech Biomed Eng 2014
  length_units: meters
  force_units: N
  credits:
    Katherine R. Saul, Wendy M. Murray, Craig M. Goehler, Melissa Daly, Meghan E. Vidt, Dustin L. Crouch
  Ground
  BodySet:
    Body thorax: mass=26.83 [kg] mass_center=(0 -0.16 0) inertia=(1.4745 0.7555 1.4314 0 0 0) meshes=thorax.vtp
      PhysicalOffsetFrame thorax_imu: socket_parent=.. translation=(0.08 -0.15 0) [meters]
          orientation=(-1.5708 1.3 0) [radians] meshes=ngimu_body.obj
      WrapEllipsoid Thorax: xyz_body_rotation=(0.0434587 -0.331962 0.189892) translation=(-0.0386 -0.1273 0.0709)
          quadrant=all dimensions=(0.1 0.135 0.08)
    Body clavicle: mass=0.156 mass_center=(-0.011096 0.0063723 0.054168)
        inertia=(0.00024259 0.00025526 4.442e-5 -1.898e-5 -6.994e-5 5.371e-5) meshes=clavicle.vtp
    Body clavphant: mass=0.0001 mass_center=(0 0 0) inertia=(1 1 1 0 0 0)
    Body scapula: mass=0.70396 mass_center=(-0.054694 -0.035032 -0.043734)
        inertia=(0.0012429 0.0011504 0.0013651 0.0004494 0.00040922 0.0002411) meshes=scapula.vtp
      WrapEllipsoid Deltoid2: xyz_body_rotation=(3.13042 -1.54881 -1.31423) translation=(-0.0058 -0.0378 0.0096)
          quadrant=-y dimensions=(0.033 0.04 0.035)
      WrapTorus Delt3: xyz_body_rotation=(0.620988 0.32882 -0.560774) translation=(-0.0973 -0.0428 -0.037) quadrant=all
          inner_radius=0.04 outer_radius=0.06
      WrapTorus INFSP: xyz_body_rotation=(0.0253073 0.58835 0.151844) translation=(-0.0561 -0.0199 -0.0112)
          quadrant=all inner_radius=0.008 outer_radius=0.019
      WrapEllipsoid TMIN: xyz_body_rotation=(-2.09754 -0.280823 -1.76348) translation=(-0.0418 -0.0519 -0.0359)
          quadrant=x dimensions=(0.03 0.03 0.05)
      WrapCylinder TRIlongglen: xyz_body_rotation=(1.37532 -0.294612 2.43596) translation=(-0.0359 -0.0309 -0.0132)
          quadrant=x radius=0.003 length=0.03
    Body scapphant: mass=0.0001 mass_center=(0 0 0) inertia=(1 1 1 0 0 0)
    Body humphant: mass=0.0001 mass_center=(0 0 0) inertia=(1 1 1 0 0 0)
    Body humphant1: mass=0.0001 mass_center=(0 0 0) inertia=(1 1 1 0 0 0)
    Body humerus: mass=1.99757 mass_center=(0.018064 -0.140141 -0.012746)
        inertia=(0.0122776 0.00255133 0.0125789 -0.00034741 -0.0002325 0.0012293) meshes=humerus.vtp
      PhysicalOffsetFrame humerus_imu: socket_parent=.. translation=(0 -0.15 0.04) orientation=(0 0 -1.5708)
          meshes=ngimu_body.obj
      WrapEllipsoid DELT1hh: xyz_body_rotation=(0.0584685 1.00461 0.570374) translation=(-0.0139 -0.0127 -0.0262)
          quadrant=z dimensions=(0.03 0.1 0.05)
      WrapCylinder delt2hum: xyz_body_rotation=(1.55093 -0.0199582 0.0596618) translation=(0.0017 -0.0958 0.0011)
          quadrant=all radius=0.0109 length=0.12
      WrapEllipsoid delt3hum: xyz_body_rotation=(1.72735 0.0759218 -2.74313) translation=(0.0019 -0.0592 0.0011)
          quadrant=x dimensions=(0.01 0.01 0.05)
      WrapEllipsoid SUPSP: xyz_body_rotation=(0.0380482 0.00855211 -1.30673) translation=(0.0002 0.0077 0.0043)
          quadrant=all dimensions=(0.02 0.02 0.02)
      WrapEllipsoid INFSP_and_TMIN_hum_head: xyz_body_rotation=(-0.286583 -0.00907571 -0.0684169)
          translation=(-0.0003 0.0026 0.0038) quadrant=all dimensions=(0.02 0.025 0.02)
      WrapEllipsoid SUBSCAP: xyz_body_rotation=(-0.924501 0.288852 0.381529) translation=(-0.0025 0.0007 -0.0045)
          quadrant=all dimensions=(0.02 0.017 0.028)
      WrapCylinder TMINhum: xyz_body_rotation=(1.75353 0.0692896 2.74628) translation=(-0.0014 -0.0455 0) quadrant=x
          radius=0.007 length=0.07
      WrapCylinder TMAJ_LAThum: xyz_body_rotation=(1.53641 -0.0637045 1.41424) translation=(0.0007 -0.0443 -0.0055)
          quadrant=-x radius=0.007 length=0.04
      WrapCylinder PEC12hum: xyz_body_rotation=(1.55928 -0.0774926 -0.925897) translation=(0.002 -0.0508 -0.0017)
          quadrant=x radius=0.009 length=0.07
      WrapSphere PEC23hh: translation=(-0.0086 0.0021 -0.0004) quadrant=all radius=0.02
      WrapEllipsoid PEC1hh: xyz_body_rotation=(-0.620465 -0.310494 0.363727) translation=(-0.0037 0.0005 -0.0025)
          quadrant=-z dimensions=(0.03 0.02 0.02)
      WrapCylinder PEC3hum: xyz_body_rotation=(1.44094 -0.0561996 1.75196) translation=(0.0009 -0.0551 -0.0004)
          quadrant=-x radius=0.008 length=0.1
      WrapCylinder LAT_TMAJhh: xyz_body_rotation=(-0.305084 -0.018326 -0.686613) translation=(-0.0224 0.0102 0.0094)
          quadrant=-y radius=0.007 length=0.045
      WrapSphere LAT_TMAJ2hh: xyz_body_rotation=(-0.127235 0.276111 0.0197222) translation=(-0.0016 0.0092 0.0052)
          quadrant=-z radius=0.03
      WrapEllipsoid Elbow_BIC_BRD: xyz_body_rotation=(-0.128631 0.137532 0.0307178) translation=(0.0019 -0.289 -0.014)
          quadrant=x dimensions=(0.015 0.015 0.1)
      WrapEllipsoid TRIlonghh: xyz_body_rotation=(3.00162 -0.853466 2.57419) translation=(-0.0078 -0.0041 -0.0014)
          quadrant=z dimensions=(0.035 0.02 0.02)
      WrapCylinder TRI: xyz_body_rotation=(-0.14015 -0.00628319 0.154985) translation=(0.0028 -0.2919 -0.0119)
          quadrant=all radius=0.016 length=0.1
      WrapEllipsoid ANC: xyz_body_rotation=(0.00750492 -0.196699 1.04929) translation=(0.0134 -0.2861 -0.0008)
          quadrant=-x dimensions=(0.02 0.02 0.02)
      WrapEllipsoid BIClong: xyz_body_rotation=(-2.00434 -1.00164 0.975465) translation=(0.0033 0.0073 0.0003)
          quadrant=-y dimensions=(0.025 0.02 0.02)
      WrapSphere TMAJ_LAT_PEC_CORBhh: translation=(0.0007 0 0.006) quadrant=all radius=0.03
      WrapSphere DELT_TMAJ_LAT_PEC_CORBhh: translation=(0.0007 0 0.006) quadrant=all radius=0.03
      WrapCylinder CORBhum: xyz_body_rotation=(-1.60832 0.0959931 0.875283) translation=(0.0027 -0.1202 -0.0059)
          quadrant=x radius=0.008 length=0.1
      WrapEllipsoid Elbow_PT_ECRL: xyz_body_rotation=(-0.161094 -0.110828 0.61453) translation=(0.003 -0.2872 -0.0069)
          quadrant=x dimensions=(0.018 0.025 0.035)
    Body ulna: mass=1.1053 mass_center=(0.00971783 -0.0959509 0.024286)
        inertia=(0.00541309 0.00115318 0.00494361 0.00031686 -7.615e-5 0.00109169) meshes=ulna.vtp
      WrapCylinder PQ2: xyz_body_rotation=(1.39138 0.0689405 1.52245) translation=(-0.0012 -0.2092 0.0428) quadrant=all
          radius=0.007 length=0.1
    Body radius: mass=0.23359 mass_center=(0.0336341 -0.181559 0.0156)
        inertia=(0.00043855 8.859e-5 0.00040258 3.014e-5 -4.24e-6 6.418e-5) meshes=radius.vtp
      PhysicalOffsetFrame radius_imu: socket_parent=.. translation=(0.02 -0.19 0.055) orientation=(-0.15 0 -1.5708)
          meshes=ngimu_body.obj
      WrapCylinder SUP: xyz_body_rotation=(1.44775 0.304036 -2.44102) translation=(0.0045 -0.0437 0.0059) quadrant=-x
          radius=0.008 length=0.04
      WrapTorus ECU: xyz_body_rotation=(-0.986635 -0.148877 0.222704) translation=(-0.0163 -0.2417 0.0349) quadrant=all
          inner_radius=0.006 outer_radius=0.009
      WrapCylinder PQ1: xyz_body_rotation=(-1.60762 -0.0127409 -2.69025) translation=(0.0281 -0.1986 0.0288)
          quadrant=all radius=0.01 length=0.1
    Body proximal_row: mass=0.0001 mass_center=(0 0 0) inertia=(1e-5 1e-5 1e-5 0 0 0)
        meshes=(lunate.vtp sdfastSCAPHOIDw.vtp sdfastPISIFORMw.vtp sdfastTRIQUETRALw.vtp)
      WrapEllipsoid Extensor_ellipse: xyz_body_rotation=(-0.250804 0.285536 0.232827)
          translation=(0.0007 -0.0135 0.0047) quadrant=z dimensions=(0.05 0.02 0.013)
      WrapTorus ECRL: xyz_body_rotation=(1.53833 0.234398 0.731118) translation=(0.0222 -0.0096 0.0208) quadrant=all
          inner_radius=0.008 outer_radius=0.016
      WrapTorus ECRB: xyz_body_rotation=(1.31266 -0.11781 -0.116239) translation=(0.0126 -0.0095 0.0186) quadrant=all
          inner_radius=0.008 outer_radius=0.01
      WrapTorus FCR: xyz_body_rotation=(-1.55596 -0.15324 -0.100007) translation=(0.0032 -0.0045 -0.019) quadrant=all
          inner_radius=0.001 outer_radius=0.0025
      WrapTorus FCU: xyz_body_rotation=(-1.57376 -0.0797616 0.39235) translation=(-0.0123 -0.0124 -0.0171) quadrant=all
          inner_radius=0.0068 outer_radius=0.008
      WrapEllipsoid PL: xyz_body_rotation=(-0.0315905 0.0996583 0.0633554) translation=(0.0057 -0.018 -0.0041)
          quadrant=-z dimensions=(0.025 0.014 0.012)
      WrapEllipsoid FDS: xyz_body_rotation=(0.00837758 -0.0816814 -0.0171042) translation=(0.0012 -0.0057 -0.0003)
          quadrant=-z dimensions=(0.025 0.013 0.012)
      WrapEllipsoid FDP: xyz_body_rotation=(-1.46747 -0.194604 0.121824) translation=(-0.0022 -0.0069 0.0032)
          quadrant=y dimensions=(0.025 0.013 0.012)
      WrapTorus EDCL: xyz_body_rotation=(2.36318 0.193033 -0.26913) translation=(-0.0128 -0.0133 0.0148) quadrant=all
          inner_radius=0.008 outer_radius=0.012
      WrapTorus EDCR: xyz_body_rotation=(1.98392 0.100531 0.523075) translation=(-0.0098 -0.0137 0.0166) quadrant=all
          inner_radius=0.0105 outer_radius=0.011
      WrapTorus EDCM: xyz_body_rotation=(1.99317 0.19792 0.368264) translation=(-0.0007 -0.0117 0.0191) quadrant=all
          inner_radius=0.009 outer_radius=0.012
      WrapTorus EDCI: xyz_body_rotation=(1.69768 0.0897099 0.00767945) translation=(0.009 -0.0149 0.0211) quadrant=all
          inner_radius=0.009 outer_radius=0.012
      WrapEllipsoid EDM: xyz_body_rotation=(2.9627 0.159349 0.117984) translation=(-0.0167 -0.0022 0.0048) quadrant=-z
          dimensions=(0.018 0.014 0.008)
      WrapEllipsoid FPL: xyz_body_rotation=(-0.16633 -0.082205 -0.0659735) translation=(0.017 -0.025 -0.0033)
          quadrant=-z dimensions=(0.016 0.01 0.01)
    Body hand: mass=0.5819 mass_center=(-0.00301314 -0.0424993 -0.00112205)
        inertia=(0.00011 6e-5 0.00015 9e-7 -2e-7 1.2e-5)
        meshes=(sdfast_1seg_hand_fr_c_5mc.vtp sdfast_1seg_hand_fr_c_4mc.vtp sdfast_1seg_hand_fr_c_3mc.vtp sdfast_1seg_hand_fr_c_2mc.vtp sdfast_1seg_hand_fr_c_trapezium.vtp sdfast_1seg_hand_fr_c_trapezoid.vtp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)
      WrapCylinder _2rdmcp_FDS: xyz_body_rotation=(0.593936 1.50011 -2.16578) translation=(0.0182 -0.0659 0.0087)
          quadrant=y radius=0.013 length=0.01
      WrapCylinder _2rdmcp_FDP: xyz_body_rotation=(0.593936 1.50011 -2.23559) translation=(0.0182 -0.0659 0.0087)
          quadrant=y radius=0.0105 length=0.01
      WrapCylinder _2rdmcp_ext: xyz_body_rotation=(0.593936 1.50011 -1.99125) translation=(0.0182 -0.0659 0.0087)
          quadrant=-y radius=0.01 length=0.01
      WrapEllipsoid _2ndmcp: active=false xyz_body_rotation=(1.48667 -1.29661 2.43072)
          translation=(0.0206 -0.068 0.0044) quadrant=-x dimensions=(0.005 0.005 0.03)
      WrapCylinder _3rdmcp_FDS: xyz_body_rotation=(0.770388 1.32837 1.5708) translation=(0.0007 -0.0655 0.0092)
          quadrant=-x radius=0.013 length=0.01
      WrapCylinder _3rdmcp_FDP: xyz_body_rotation=(0.770388 1.32837 1.5708) translation=(0.0046 -0.0662 0.0099)
          quadrant=-x radius=0.0105 length=0.01
      WrapCylinder _3rdmcp_ext: xyz_body_rotation=(0.770388 1.32837 1.46608) translation=(0.0007 -0.0655 0.0092)
          quadrant=y radius=0.01 length=0.01
      WrapCylinder _4rdmcp_FDS: xyz_body_rotation=(0.858527 1.10165 -2.48535) translation=(-0.0139 -0.0642 0.0033)
          quadrant=y radius=0.013 length=0.01
      WrapCylinder _4rdmcp_FDP: xyz_body_rotation=(0.858527 1.10165 -2.48535) translation=(-0.0139 -0.0642 0.0033)
          quadrant=y radius=0.0105 length=0.01
      WrapCylinder _4rdmcp_ext: xyz_body_rotation=(0.858527 1.10165 -3.09621) translation=(-0.0139 -0.0642 0.0033)
          quadrant=x radius=0.01 length=0.01
      WrapCylinder _5rdmcp_FDS: xyz_body_rotation=(0.470541 0.975639 -2.12162) translation=(-0.0235 -0.0561 -0.0057)
          quadrant=y radius=0.013 length=0.012
      WrapCylinder _5rdmcp_FDP: xyz_body_rotation=(0.470541 0.975639 -2.34852) translation=(-0.0235 -0.0561 -0.0057)
          quadrant=y radius=0.0105 length=0.01
      WrapCylinder _5rdmcp_ext: xyz_body_rotation=(0.470541 0.975639 -1.68529) translation=(-0.0235 -0.0561 -0.0057)
          quadrant=-y radius=0.01 length=0.012
      WrapCylinder Secondpm_FDS: xyz_body_rotation=(-1.57813 1.24808 1.0259) translation=(0.0307 -0.0924 -0.0222)
          quadrant=y radius=0.0075 length=0.01
      WrapCylinder Secondpm_FDP: xyz_body_rotation=(-1.57813 1.24808 1.0259) translation=(0.0307 -0.0924 -0.0222)
          quadrant=y radius=0.008 length=0.01
      WrapCylinder Secondpm_ext: xyz_body_rotation=(-1.57813 1.24808 1.0259) translation=(0.0307 -0.0924 -0.0222)
          quadrant=-y radius=0.0055 length=0.012
      WrapCylinder Secondmd_flex: xyz_body_rotation=(-1.63171 1.34286 2.11639) translation=(0.0291 -0.0821 -0.045)
          quadrant=y radius=0.005 length=0.01
      WrapCylinder Secondmd_ext: xyz_body_rotation=(-1.63171 1.34286 2.11639) translation=(0.0291 -0.0821 -0.045)
          quadrant=-y radius=0.002 length=0.01
      WrapCylinder Secondpm: active=false xyz_body_rotation=(2.2513 -1.37008 1.18159)
          translation=(0.0306 -0.0911 -0.0223) quadrant=all radius=0.004 length=0.01
      WrapCylinder Secondmd: active=false xyz_body_rotation=(1.35525 -1.38387 -0.557109)
          translation=(0.0295 -0.0815 -0.0441) quadrant=x radius=0.003 length=0.01
      WrapCylinder MPthumb: xyz_body_rotation=(0.321315 0.11013 -0.834791) translation=(0.0402 -0.0405 -0.0271)
          quadrant=all radius=0.0085 length=0.02
      WrapCylinder IPthumb: xyz_body_rotation=(0.332136 -0.026529 -0.257611) translation=(0.0396 -0.0713 -0.0365)
          quadrant=-x radius=0.0045 length=0.01
      WrapCylinder Thirdpm_FDS: xyz_body_rotation=(-0.407883 1.45246 -0.145386) translation=(0.0122 -0.0934 -0.0238)
          quadrant=y radius=0.0075 length=0.01
      WrapCylinder Thirdpm_FDP: xyz_body_rotation=(-0.407883 1.45246 -0.145386) translation=(0.0122 -0.0934 -0.0238)
          quadrant=y radius=0.008 length=0.01
      WrapCylinder Thirdpm_ext: xyz_body_rotation=(-0.407883 1.45246 -0.145386) translation=(0.0122 -0.0934 -0.0238)
          quadrant=-y radius=0.0055 length=0.01
      WrapCylinder Thirdmd_flex: xyz_body_rotation=(0.714189 1.28282 -0.203331) translation=(0.019 -0.0814 -0.0494)
          quadrant=y radius=0.005 length=0.01
      WrapCylinder Thirdmd_ext: xyz_body_rotation=(0.714189 1.28282 -0.203331) translation=(0.019 -0.0814 -0.0494)
          quadrant=-y radius=0.002 length=0.01
      WrapCylinder Fourthpm_FDS: xyz_body_rotation=(0.696212 0.976861 -1.21876) translation=(-0.005 -0.0871 -0.0289)
          quadrant=y radius=0.0075 length=0.01
      WrapCylinder Fourthpm_FDP: xyz_body_rotation=(0.696212 0.976861 -1.21876) translation=(-0.005 -0.0871 -0.0289)
          quadrant=y radius=0.008 length=0.01
      WrapCylinder Fourthpm_ext: xyz_body_rotation=(0.696212 0.976861 -1.21876) translation=(-0.005 -0.0871 -0.0289)
          quadrant=-y radius=0.0055 length=0.01
      WrapCylinder Fourthmd_flex: xyz_body_rotation=(0.75311 0.925897 -0.167377) translation=(0.0094 -0.0778 -0.0469)
          quadrant=y radius=0.005 length=0.01
      WrapCylinder Fourthmd_ext: xyz_body_rotation=(0.75311 0.925897 -0.167377) translation=(0.0094 -0.0778 -0.0469)
          quadrant=-y radius=0.002 length=0.01
      WrapCylinder Fifthpm_FDS: xyz_body_rotation=(0.977035 0.825192 -1.51687) translation=(-0.0154 -0.0784 -0.0329)
          quadrant=y radius=0.0075 length=0.01
      WrapCylinder Fifthpm_FDP: xyz_body_rotation=(0.977035 0.825192 -1.79612) translation=(-0.0153 -0.0786 -0.0329)
          quadrant=y radius=0.008 length=0.01
      WrapCylinder Fifthpm_ext: xyz_body_rotation=(0.977035 0.825192 -1.08053) translation=(-0.0152 -0.0785 -0.0328)
          quadrant=-y radius=0.0055 length=0.01
      WrapCylinder Fifthmd_flex: xyz_body_rotation=(0.979304 0.65031 -0.620814) translation=(0.0007 -0.0741 -0.0457)
          quadrant=y radius=0.005 length=0.01
      WrapCylinder Fifthmd_ext: xyz_body_rotation=(0.979304 0.65031 -0.620814) translation=(0.007 -0.0741 -0.0457)
          quadrant=-y radius=0.002 length=0.01
    Body machine_core: mass=20 mass_center=(0 0 0) inertia=(0 0 0 0 0 0) meshes=machine.obj
    Body machine_lever: mass=0.2 mass_center=(0 0 0) inertia=(0 0 0 0 0 0) meshes=lever.obj
  JointSet:
    CustomJoint ground_thorax: socket_parent_frame=ground_offset socket_child_frame=thorax_offset
      Coordinate thorax_rx: default_value=0 range=(-6.283185 6.283185) clamped=true
      Coordinate thorax_ry: default_value=0 range=(-6.283185 6.283185) clamped=true
      Coordinate thorax_rz: default_value=0 range=(-6.283185 6.283185) clamped=true
      Coordinate thorax_tx: default_value=0 range=(-5 5) clamped=false locked=true
      Coordinate thorax_ty: default_value=0 range=(-5 5) clamped=false locked=true
      Coordinate thorax_tz: default_value=0 range=(-5 5) clamped=false locked=true
      PhysicalOffsetFrame ground_offset: socket_parent=/ground translation=(0 0 0)
      PhysicalOffsetFrame thorax_offset: socket_parent=/bodyset/thorax translation=(0 -0.6 0)
      SpatialTransform:
        TransformAxis rotation1: coordinates=thorax_rx axis=(1 0 0) LinearFunction(coefficients=1 0)
        TransformAxis rotation2: coordinates=thorax_ry axis=(0 1 0) LinearFunction(coefficients=1 0)
        TransformAxis rotation3: coordinates=thorax_rz axis=(0 0 1) LinearFunction(coefficients=1 0)
        TransformAxis translation1: coordinates=thorax_tx axis=(1 0 0) LinearFunction(coefficients=1 0)
        TransformAxis translation2: coordinates=thorax_ty axis=(0 1 0) LinearFunction(coefficients=1 0)
        TransformAxis translation3: coordinates=thorax_tz axis=(0 0 1) LinearFunction(coefficients=1 0)
    CustomJoint sternoclavicular: socket_parent_frame=thorax_offset socket_child_frame=clavicle_offset
      Coordinate sternoclavicular_r2: default_value=-0.3801336 range=(-99999.9 99999.9) clamped=false
      Coordinate sternoclavicular_r3: default_value=0.1610066 range=(-99999.9 99999.9) clamped=false
      PhysicalOffsetFrame thorax_offset: socket_parent=/bodyset/thorax translation=(0.006325 0.00693 0.025465)
      PhysicalOffsetFrame clavicle_offset: socket_parent=/bodyset/clavicle translation=(0 0 0)
      SpatialTransform: axes_held_at_zero=(rotation3 translation1 translation2 translation3)
        TransformAxis rotation1: coordinates=sternoclavicular_r2 axis=(0.0153 0.9892987 -0.1451)
            LinearFunction(coefficients=1 0)
        TransformAxis rotation2: coordinates=sternoclavicular_r3 axis=(-0.9944725 0 -0.104997)
            LinearFunction(coefficients=1 0)
    CustomJoint unrotscap: socket_parent_frame=clavicle_offset socket_child_frame=clavphant_offset
      Coordinate unrotscap_r3: default_value=-0.1610066 range=(-99999.9 99999.9) clamped=false
      Coordinate unrotscap_r2: default_value=0.3801336 range=(-99999.9 99999.9) clamped=false
      PhysicalOffsetFrame clavicle_offset: socket_parent=/bodyset/clavicle translation=(-0.01433 0.02007 0.135535)
      PhysicalOffsetFrame clavphant_offset: socket_parent=/bodyset/clavphant translation=(0 0 0)
      SpatialTransform: axes_held_at_zero=(rotation3 translation1 translation2 translation3)
        TransformAxis rotation1: coordinates=unrotscap_r3 axis=(-0.9944725 0 -0.104997)
            LinearFunction(coefficients=1 0)
        TransformAxis rotation2: coordinates=unrotscap_r2 axis=(0.0153 0.9892987 -0.1451)
            LinearFunction(coefficients=1 0)
    CustomJoint acromioclavicular: socket_parent_frame=clavphant_offset socket_child_frame=scapula_offset
      Coordinate acromioclavicular_r2: default_value=-0.07696931 range=(-99999.9 99999.9) clamped=false
      Coordinate acromioclavicular_r3: default_value=0.6220389 range=(-99999.9 99999.9) clamped=false
      Coordinate acromioclavicular_r1: default_value=0.2796022 range=(-99999.9 99999.9) clamped=false
      PhysicalOffsetFrame clavphant_offset: socket_parent=/bodyset/clavphant translation=(0 0 0)
      PhysicalOffsetFrame scapula_offset: socket_parent=/bodyset/scapula translation=(0 0 0)
      SpatialTransform: axes_held_at_zero=(translation1 translation2 translation3)
        TransformAxis rotation1: coordinates=acromioclavicular_r2 axis=(0.1570949 0.9472686 -0.2792909)
            LinearFunction(coefficients=1 0)
        TransformAxis rotation2: coordinates=acromioclavicular_r3 axis=(-0.754084 0.297594 0.585487)
            LinearFunction(coefficients=1 0)
        TransformAxis rotation3: coordinates=acromioclavicular_r1 axis=(0.6376998 0.1186 0.7610998)
            LinearFunction(coefficients=1 0)
    CustomJoint unrothum: socket_parent_frame=scapula_offset socket_child_frame=scapphant_offset
      Coordinate unrothum_r1: default_value=-0.2796022 range=(-99999.9 99999.9) clamped=false
      Coordinate unrothum_r3: default_value=-0.6220389 range=(-99999.9 99999.9) clamped=false
      Coordinate unrothum_r2: default_value=0.07696931 range=(-99999.9 99999.9) clamped=false
      PhysicalOffsetFrame scapula_offset: socket_parent=/bodyset/scapula translation=(-0.00955 -0.034 0.009)
      PhysicalOffsetFrame scapphant_offset: socket_parent=/bodyset/scapphant translation=(0 0 0)
      SpatialTransform: axes_held_at_zero=(translation1 translation2 translation3)
        TransformAxis rotation1: coordinates=unrothum_r1 axis=(0.6376998 0.1186 0.7610998)
            LinearFunction(coefficients=1 0)
        TransformAxis rotation2: coordinates=unrothum_r3 axis=(-0.754084 0.297594 0.585487)
            LinearFunction(coefficients=1 0)
        TransformAxis rotation3: coordinates=unrothum_r2 axis=(0.1570949 0.9472686 -0.2792909)
            LinearFunction(coefficients=1 0)
    CustomJoint shoulder0: socket_parent_frame=scapphant_offset socket_child_frame=humphant_offset
      Coordinate elv_angle: default_value=0 range=(-1.570796 2.268928) clamped=false
      PhysicalOffsetFrame scapphant_offset: socket_parent=/bodyset/scapphant translation=(0 0 0)
      PhysicalOffsetFrame humphant_offset: socket_parent=/bodyset/humphant translation=(0 0 0)
      SpatialTransform: axes_held_at_zero=(rotation2 rotation3 translation1 translation2 translation3)
        TransformAxis rotation1: coordinates=elv_angle axis=(0.0048 0.9990892 0.04240001)
            LinearFunction(coefficients=1 0)
    CustomJoint shoulder1: socket_parent_frame=humphant_offset socket_child_frame=humphant1_offset
      Coordinate shoulder_elv: default_value=1.570796 range=(0 3.141593) clamped=false
      Coordinate shoulder1_r2: default_value=0 range=(-99999.9 99999.9) clamped=false
      PhysicalOffsetFrame humphant_offset: socket_parent=/bodyset/humphant translation=(0 0 0)
      PhysicalOffsetFrame humphant1_offset: socket_parent=/bodyset/humphant1 translation=(0 0 0)
      SpatialTransform: axes_held_at_zero=(rotation3 translation1 translation2 translation3)
        TransformAxis rotation1: coordinates=shoulder_elv axis=(-0.9982614 0.0023 0.05889802)
            LinearFunction(coefficients=1 0)
        TransformAxis rotation2: coordinates=shoulder1_r2 axis=(0.0048 0.9990892 0.04240001)
            LinearFunction(coefficients=1 0)
    CustomJoint shoulder2: socket_parent_frame=humphant1_offset socket_child_frame=humerus_offset
      Coordinate shoulder_rot: default_value=0 range=(-1.570796 0.3490659) clamped=false
      PhysicalOffsetFrame humphant1_offset: socket_parent=/bodyset/humphant1 translation=(0 0 0)
      PhysicalOffsetFrame humerus_offset: socket_parent=/bodyset/humerus translation=(0 0 0)
      SpatialTransform: axes_held_at_zero=(rotation2 rotation3 translation1 translation2 translation3)
        TransformAxis rotation1: coordinates=shoulder_rot axis=(0.0048 0.9990892 0.04240001)
            LinearFunction(coefficients=1 0)
    CustomJoint elbow: socket_parent_frame=humerus_offset socket_child_frame=ulna_offset
      Coordinate elbow_flexion: default_value=1.570796 range=(0 2.268928) clamped=false
      PhysicalOffsetFrame humerus_offset: socket_parent=/bodyset/humerus translation=(0.0061 -0.2904 -0.0123)
      PhysicalOffsetFrame ulna_offset: socket_parent=/bodyset/ulna translation=(0 0 0)
      SpatialTransform: axes_held_at_zero=(rotation2 rotation3 translation1 translation2 translation3)
        TransformAxis rotation1: coordinates=elbow_flexion axis=(0.04940001 0.03660001 0.9981083)
            LinearFunction(coefficients=1 0)
    CustomJoint radioulnar: socket_parent_frame=ulna_offset socket_child_frame=radius_offset
      Coordinate pro_sup: default_value=-2e-8 range=(-1.570796 1.570796) clamped=false
      PhysicalOffsetFrame ulna_offset: socket_parent=/bodyset/ulna translation=(0.0004 -0.011503 0.019999)
      PhysicalOffsetFrame radius_offset: socket_parent=/bodyset/radius translation=(0 0 0)
      SpatialTransform: axes_held_at_zero=(rotation2 rotation3 translation1 translation2 translation3)
        TransformAxis rotation1: coordinates=pro_sup axis=(-0.01716099 0.9926656 -0.119668)
            LinearFunction(coefficients=1 0)
    CustomJoint radiocarpal: socket_parent_frame=radius_offset socket_child_frame=proximal_row_offset
      Coordinate deviation: default_value=0 range=(-0.1745329 0.4363323) clamped=false
      Coordinate flexion: default_value=-3.278601e-36 range=(-1.22173 1.22173) clamped=false
      PhysicalOffsetFrame radius_offset: socket_parent=/bodyset/radius translation=(0.018 -0.242 0.025)
      PhysicalOffsetFrame proximal_row_offset: socket_parent=/bodyset/proximal_row translation=(0 0 0)
      SpatialTransform: axes_held_at_zero=(rotation2 translation1 translation2 translation3)
        TransformAxis rotation1: coordinates=deviation axis=(-0.819064 -0.135611 -0.557444)
          SimmSpline: x=(-0.174533 0 0.436332) y=(-0.174533 0 0.436332)
        TransformAxis rotation3: coordinates=flexion axis=(0.9564267 -0.2522069 0.147104)
          SimmSpline: x=(-1.5708 1.5708) y=(-0.785398 0.785398)
    CustomJoint wrist_hand: socket_parent_frame=proximal_row_offset socket_child_frame=hand_offset
      Coordinate wrist_hand_r1: default_value=0 range=(-99999.9 99999.9) clamped=false
      Coordinate wrist_hand_r3: default_value=0 range=(-99999.9 99999.9) clamped=false
      PhysicalOffsetFrame proximal_row_offset: socket_parent=/bodyset/proximal_row
          translation=(0.003992 -0.015054 0.002327)
      PhysicalOffsetFrame hand_offset: socket_parent=/bodyset/hand translation=(0 0 0)
      SpatialTransform: axes_held_at_zero=(rotation3 translation1 translation2 translation3)
        TransformAxis rotation1: coordinates=wrist_hand_r1 axis=(0.8991357 -0.3490529 -0.2640399)
            LinearFunction(coefficients=1 0)
        TransformAxis rotation2: coordinates=wrist_hand_r3 axis=(0.9971185 0.01069999 -0.07510096)
            LinearFunction(coefficients=1 0)
    WeldJoint machine_ground: socket_parent_frame=ground_offset socket_child_frame=machine_core_offset
      PhysicalOffsetFrame ground_offset: socket_parent=/ground translation=(0 0 0)
      PhysicalOffsetFrame machine_core_offset: socket_parent=/bodyset/machine_core translation=(0.13 -0.2 -0.55)
          orientation=(0 -1.57 0)
    CustomJoint leverToMachine: socket_parent_frame=machine_core_offset socket_child_frame=machine_lever_offset
      Coordinate lever_ry: default_value=-0.8234101 range=(-2.15 0)
        prescribed_function: SimmSpline: x=(0 0.15 2.25 2.5 2.75 4.85 5) y=(1.48 1.465 0.07 0.05 0.07 1.465 1.48)
      PhysicalOffsetFrame machine_core_offset: socket_parent=/bodyset/machine_core translation=(-0.085 0.27 -0.12)
      PhysicalOffsetFrame machine_lever_offset: socket_parent=/bodyset/machine_lever translation=(-0.085 0.265 -0.12)
      SpatialTransform:
        TransformAxis rotation1: coordinates=lever_ry axis=(1 0 0) LinearFunction(coefficients=1 0)
        TransformAxis rotation2: axis=(0 1 0)
        TransformAxis rotation3: axis=(0 0 1)
        TransformAxis translation1: axis=(1 0 0)
        TransformAxis translation2: axis=(0 1 0)
        TransformAxis translation3: axis=(0 0 1)
  ConstraintSet:
    CoordinateCouplerConstraint [values shared by the 13 below unless stated]: independent_coordinate_names=shoulder_elv
        scale_factor=1
    CoordinateCouplerConstraint sternoclavicular_r2_con: dependent_coordinate_name=sternoclavicular_r2
      coupled_coordinates_function: SimmSpline: x=(0 2.61799) y=(0 -0.633555)
    CoordinateCouplerConstraint sternoclavicular_r3_con: dependent_coordinate_name=sternoclavicular_r3
      coupled_coordinates_function: SimmSpline: x=(0 3.14159) y=(0 0.322013)
    CoordinateCouplerConstraint unrotscap_r2_con: dependent_coordinate_name=unrotscap_r2
      coupled_coordinates_function: SimmSpline: x=(0 2.61799) y=(0 0.633555)
    CoordinateCouplerConstraint unrotscap_r3_con: dependent_coordinate_name=unrotscap_r3
      coupled_coordinates_function: SimmSpline: x=(0 3.14159) y=(0 -0.322013)
    CoordinateCouplerConstraint acromioclavicular_r1_con: dependent_coordinate_name=acromioclavicular_r1
      coupled_coordinates_function: SimmSpline: x=(0 2.61799) y=(0 0.466003)
    CoordinateCouplerConstraint acromioclavicular_r2_con: dependent_coordinate_name=acromioclavicular_r2
      coupled_coordinates_function: SimmSpline: x=(0 2.61799) y=(0 -0.128282)
    CoordinateCouplerConstraint acromioclavicular_r3_con: dependent_coordinate_name=acromioclavicular_r3
      coupled_coordinates_function: SimmSpline: x=(0 2.61799) y=(0 1.03673)
    CoordinateCouplerConstraint unrothum_r1_con: dependent_coordinate_name=unrothum_r1
      coupled_coordinates_function: SimmSpline: x=(0 2.61799) y=(0 -0.466003)
    CoordinateCouplerConstraint unrothum_r2_con: dependent_coordinate_name=unrothum_r2
      coupled_coordinates_function: SimmSpline: x=(0 2.61799) y=(0 0.128282)
    CoordinateCouplerConstraint unrothum_r3_con: dependent_coordinate_name=unrothum_r3
      coupled_coordinates_function: SimmSpline: x=(0 2.61799) y=(0 -1.03673)
    CoordinateCouplerConstraint shoulder1_r2_con: independent_coordinate_names=elv_angle
        dependent_coordinate_name=shoulder1_r2
      coupled_coordinates_function: SimmSpline: x=(-1.5708 3.14159) y=(1.5708 -3.14159)
    CoordinateCouplerConstraint wrist_hand_r1_con: independent_coordinate_names=deviation
        dependent_coordinate_name=wrist_hand_r1
      coupled_coordinates_function: SimmSpline f18: x=(-0.174533 0 0.436332) y=(-0.261799 0 0.436332)
    CoordinateCouplerConstraint wrist_hand_r3_con: independent_coordinate_names=flexion
        dependent_coordinate_name=wrist_hand_r3
      coupled_coordinates_function: SimmSpline f19: x=(-1.22173 1.22173) y=(-0.610865 0.610865)
  ForceSet:
    CoordinateLimitForce shoulder_elv_ligaments: coordinate=shoulder_elv upper_stiffness=100 [N*m/degree]
        upper_limit=150 [degrees] lower_stiffness=100 [N*m/degree] lower_limit=30 [degrees] damping=0
        transition=542.8423 [degrees]
    CoordinateLimitForce shoulder_elv_damping: coordinate=shoulder_elv upper_stiffness=1e-8 upper_limit=190
        lower_stiffness=1e-8 lower_limit=190 damping=0.001745 transition=1
    CoordinateLimitForce elv_angle_ligaments: coordinate=elv_angle upper_stiffness=100 upper_limit=100
        lower_stiffness=100 lower_limit=-60 damping=0 transition=545.4471
    CoordinateLimitForce elv_angle_damping: coordinate=elv_angle upper_stiffness=1e-8 upper_limit=190
        lower_stiffness=1e-8 lower_limit=190 damping=0.001745 transition=1
    CoordinateLimitForce shoulder_rot_ligaments: coordinate=shoulder_rot upper_stiffness=100 upper_limit=-10
        lower_stiffness=100 lower_limit=-60 damping=0 transition=485.466
    CoordinateLimitForce shoulder_rot_damping: coordinate=shoulder_rot upper_stiffness=1e-8 upper_limit=190
        lower_stiffness=1e-8 lower_limit=190 damping=0.001745 transition=1
    CoordinateLimitForce elbow_flexion_ligaments: coordinate=elbow_flexion upper_stiffness=0.3037 upper_limit=85
        lower_stiffness=100 lower_limit=14 damping=0 transition=139.5813
    CoordinateLimitForce elbow_flexion_damping: coordinate=elbow_flexion upper_stiffness=1e-8 upper_limit=190
        lower_stiffness=1e-8 lower_limit=190 damping=0.001745 transition=1
    CoordinateLimitForce pro_sup_ligaments: coordinate=pro_sup upper_stiffness=50 upper_limit=60 lower_stiffness=50
        lower_limit=-60 damping=0 transition=430.1186
    CoordinateLimitForce pro_sup_damping: coordinate=pro_sup upper_stiffness=1e-8 upper_limit=190 lower_stiffness=1e-8
        lower_limit=190 damping=0.001745 transition=1
    CoordinateLimitForce deviation_ligaments: coordinate=deviation upper_stiffness=52.5961 upper_limit=20
        lower_stiffness=487.176 lower_limit=-6 damping=0 transition=39.1586
    CoordinateLimitForce deviation_damping: coordinate=deviation upper_stiffness=1e-8 upper_limit=190
        lower_stiffness=1e-8 lower_limit=190 damping=0.001745 transition=1
    CoordinateLimitForce flexion_ligaments: coordinate=flexion upper_stiffness=200 upper_limit=60
        lower_stiffness=135.3232 lower_limit=-60 damping=0 transition=92.916
    CoordinateLimitForce flexion_damping: coordinate=flexion upper_stiffness=1e-8 upper_limit=190 lower_stiffness=1e-8
        lower_limit=190 damping=0.00043633 transition=1
    Schutte1993Muscle_Deprecated [values shared by the 50 below unless stated]:
      tendon_force_length_curve: SimmSpline: x=(-10 -0.002 -0.001 0 0.00131 0.00281 0.00431 0.00581 0.00731 0.00881 0.0103 0.0118 0.0123 9.2 9.201 9.202 20)
          y=(0 0 0 0 0.0108 0.0257 0.0435 0.0652 0.0915 0.123 0.161 0.208 0.227 345 345 345 345)
      active_force_length_curve: SimmSpline: x=(-35 0 0.401 0.402 0.4035 0.52725 0.62875 0.71875 0.86125 1.045 1.2175 1.43875 1.61875 1.62 1.621 2.2 35)
          y=(0 0 0 0 0 0.226667 0.636667 0.856667 0.95 0.993333 0.77 0.246667 0 0 0 0 0)
      passive_force_length_curve: SimmSpline: x=(-35 1 1.05 1.1 1.125 1.14 1.145 1.15 1.15 1.25 1.35 1.45 1.55 1.65 1.75 1.7501 1.7502 35)
          y=(0 0 0 0 0 0 0 0 0 0.035 0.12 0.26 0.55 1.17 2 2 2 2)
    Schutte1993Muscle_Deprecated DELT1: max_isometric_force=1218.9 optimal_fiber_length=0.0976
        tendon_slack_length=0.093 pennation_angle_at_optimal=0.3839724 [radians] max_contraction_velocity=0
        time_scale=0.1 activation1=7.667 activation2=1.459854 damping=0.017
      PathPoint P1: humerus (0.00896 -0.11883 0.00585)
      PathPoint P2: humerus (0.01623 -0.11033 0.00412)
      PathPoint P3: scapula (0.04347 -0.03252 0.00099)
      PathPoint P4: clavicle (-0.014 0.01106 0.08021)
      PathWrap: wrap_object=delt2hum method=hybrid
      PathWrap pathwrap_0: wrap_object=DELT1hh method=hybrid range=(2 3)
    Schutte1993Muscle_Deprecated DELT2: max_isometric_force=1103.5 optimal_fiber_length=0.1078
        tendon_slack_length=0.1095 pennation_angle_at_optimal=0.2617994 max_contraction_velocity=0 time_scale=0.1
        activation1=7.667 activation2=1.459854 damping=0.017
      PathPoint P1: humerus (0.00461 -0.13611 0.0056)
      MovingPathPoint default: clavicle socket_x_coordinate=/jointset/shoulder1/shoulder_elv
          socket_y_coordinate=/jointset/shoulder1/shoulder_elv socket_z_coordinate=/jointset/shoulder1/shoulder_elv
          x_location=PiecewiseLinearFunction(x=0 2.1 3.14, y=0.02 0.02 0.015)
        y_location: PiecewiseLinearFunction: x=(0 1.507 3.14) y=(-0.01 0.035 0.055)
        z_location: SimmSpline: x=(0 1.507 3.14) y=(0.186 0.171 0.126)
      PathPoint P3: scapula (5e-5 0.00294 0.02233)
      PathPoint P4: scapula (-0.01078 -0.00034 0.0062)
      PathWrap: wrap_object=Deltoid2 method=hybrid
      PathWrap pathwrap_0: wrap_object=delt2hum method=hybrid
      PathWrap pathwrap_1: wrap_object=DELT_TMAJ_LAT_PEC_CORBhh method=hybrid
    Schutte1993Muscle_Deprecated DELT3: max_isometric_force=201.6 optimal_fiber_length=0.1367 tendon_slack_length=0.038
        pennation_angle_at_optimal=0.3141593 max_contraction_velocity=0 time_scale=0.1 activation1=7.667
        activation2=1.459854 damping=0.017
      PathPoint P1: scapula (-0.05573 0.00122 -0.02512)
      PathPoint P2: scapula (-0.07247 -0.03285 0.01233)
      PathPoint P3: humerus (0.00206 -0.07602 0.01045)
      PathWrap: wrap_object=Delt3 method=hybrid range=(1 2)
      PathWrap pathwrap_0: wrap_object=delt3hum method=hybrid
      PathWrap pathwrap_1: wrap_object=DELT_TMAJ_LAT_PEC_CORBhh method=hybrid
    Schutte1993Muscle_Deprecated SUPSP: max_isometric_force=499.2 optimal_fiber_length=0.0682
        tendon_slack_length=0.0395 pennation_angle_at_optimal=0.1221731 max_contraction_velocity=0 time_scale=0.1
        activation1=7.667 activation2=1.459854 damping=0.017
      PathPoint P1: humerus (0.00256 0.01063 0.02593)
      PathPoint P2: scapula (-0.01918 0.00127 -0.01271)
      PathPoint P3: scapula (-0.044 -0.01512 -0.05855)
      PathWrap: wrap_object=SUPSP method=hybrid
    Schutte1993Muscle_Deprecated INFSP: max_isometric_force=1075.8 optimal_fiber_length=0.0755
        tendon_slack_length=0.0308 pennation_angle_at_optimal=0.3316126 max_contraction_velocity=0 time_scale=0.1
        activation1=7.667 activation2=1.459854 damping=0.017
      PathPoint P1: humerus (-0.00887 0.00484 0.02448)
      PathPoint P2: scapula (-0.07382 -0.05476 -0.04781)
      PathWrap: wrap_object=INFSP method=hybrid
      PathWrap pathwrap_0: wrap_object=INFSP_and_TMIN_hum_head method=hybrid
    Schutte1993Muscle_Deprecated SUBSC: max_isometric_force=1306.9 optimal_fiber_length=0.0873
        tendon_slack_length=0.033 pennation_angle_at_optimal=0.3490659 max_contraction_velocity=0 time_scale=0.1
        activation1=7.667 activation2=1.459854 damping=0.017
      PathPoint P1: humerus (0.01403 0.0084 -0.01331)
      PathPoint P2: scapula (-0.01831 -0.05223 -0.02457)
      PathPoint P3: scapula (-0.07246 -0.03943 -0.06475)
      PathWrap: wrap_object=SUBSCAP method=hybrid
    Schutte1993Muscle_Deprecated TMIN: max_isometric_force=269.5 optimal_fiber_length=0.0741 tendon_slack_length=0.0713
        pennation_angle_at_optimal=0.418879 max_contraction_velocity=0 time_scale=0.1 activation1=7.667
        activation2=1.459854 damping=0.017
      PathPoint P1: humerus (-0.0011 -0.01264 0.02156)
      PathPoint P2: scapula (-0.09473 -0.07991 -0.04737)
      PathPoint P3: scapula (-0.09643 -0.08121 -0.05298)
      PathWrap: wrap_object=TMIN method=hybrid range=(1 2)
      PathWrap pathwrap_0: wrap_object=INFSP_and_TMIN_hum_head method=hybrid range=(1 2)
      PathWrap pathwrap_1: wrap_object=TMINhum method=hybrid range=(1 2)
    Schutte1993Muscle_Deprecated TMAJ: max_isometric_force=144 optimal_fiber_length=0.1624 tendon_slack_length=0.02
        pennation_angle_at_optimal=0.2792527 max_contraction_velocity=0 time_scale=0.1 activation1=7.667
        activation2=1.459854 damping=0.017
      PathPoint P1: humerus (0.00998 -0.05419 -0.00568)
      PathPoint P2: scapula (-0.10264 -0.10319 -0.05829)
      PathPoint P3: scapula (-0.10489 -0.10895 -0.07117)
      PathWrap: wrap_object=TMAJ_LAThum method=hybrid
      PathWrap pathwrap_0: wrap_object=LAT_TMAJhh method=hybrid range=(1 2)
      PathWrap pathwrap_1: wrap_object=LAT_TMAJ2hh method=hybrid
    Schutte1993Muscle_Deprecated PECM1: max_isometric_force=444.3 optimal_fiber_length=0.1442
        tendon_slack_length=0.0028 pennation_angle_at_optimal=0.296706 max_contraction_velocity=0 time_scale=0.1
        activation1=7.667 activation2=1.459854 damping=0.017
      PathPoint P1: humerus (0.01169 -0.04191 0.0078)
      MovingPathPoint default: humerus socket_x_coordinate=/jointset/shoulder1/shoulder_elv
          socket_y_coordinate=/jointset/shoulder1/shoulder_elv socket_z_coordinate=/jointset/shoulder1/shoulder_elv
          x_location=PiecewiseLinearFunction(x=0 3.14159, y=0.01615 0.02205)
          y_location=PiecewiseLinearFunction(x=0 3.14159, y=-0.04045 -0.01975)
          z_location=PiecewiseLinearFunction(x=0 3.14159, y=-0.00577 0.00863)
      MovingPathPoint default_0: thorax socket_x_coordinate=/jointset/shoulder1/shoulder_elv
          socket_y_coordinate=/jointset/shoulder1/shoulder_elv socket_z_coordinate=/jointset/shoulder1/shoulder_elv
          x_location=PiecewiseLinearFunction(x=0 3.14159, y=0.00958 -0.00972)
          y_location=PiecewiseLinearFunction(x=0 3.14159, y=-0.01509 0.03151)
          z_location=PiecewiseLinearFunction(x=0 3.14159, y=0.12664 0.08244)
      PathPoint P2: clavicle (0.00321 -0.00013 0.05113)
      PathWrap: wrap_object=Thorax method=hybrid
      PathWrap pathwrap_0: wrap_object=PEC12hum method=hybrid range=(2 3)
      PathWrap pathwrap_1: wrap_object=PEC1hh method=hybrid
    Schutte1993Muscle_Deprecated PECM2: max_isometric_force=658.3 optimal_fiber_length=0.1385 tendon_slack_length=0.089
        pennation_angle_at_optimal=0.4537856 max_contraction_velocity=0 time_scale=0.1 activation1=7.667
        activation2=1.459854 damping=0.017
      PathPoint P1: humerus (0.01274 -0.04289 0.00785)
      MovingPathPoint default: humerus socket_x_coordinate=/jointset/shoulder1/shoulder_elv
          socket_y_coordinate=/jointset/shoulder1/shoulder_elv socket_z_coordinate=/jointset/shoulder1/shoulder_elv
          x_location=PiecewiseLinearFunction(x=0 3.14159, y=0.01453 0.02043)
          y_location=PiecewiseLinearFunction(x=0 3.14159, y=-0.04568 -0.02498)
          z_location=PiecewiseLinearFunction(x=0 3.14159, y=-0.00687 0.00753)
      MovingPathPoint default_0: thorax socket_x_coordinate=/jointset/shoulder1/shoulder_elv
          socket_y_coordinate=/jointset/shoulder1/shoulder_elv socket_z_coordinate=/jointset/shoulder1/shoulder_elv
          x_location=PiecewiseLinearFunction(x=0 3.14159, y=0.02018 0.02148)
          y_location=PiecewiseLinearFunction(x=0 3.14159, y=-0.04165 0.00155)
          z_location=PiecewiseLinearFunction(x=0 3.14159, y=0.1269 0.1042)
      PathPoint P4: thorax (0.03091 -0.03922 0.09705)
      PathPoint P5: thorax (0.02769 -0.04498 0.02271)
      PathWrap: wrap_object=Thorax method=hybrid
      PathWrap pathwrap_0: wrap_object=PEC12hum method=hybrid range=(2 3)
      PathWrap pathwrap_1: wrap_object=TMAJ_LAT_PEC_CORBhh method=hybrid
      PathWrap pathwrap_2: wrap_object=PEC23hh method=hybrid
    Schutte1993Muscle_Deprecated PECM3: max_isometric_force=498.1 optimal_fiber_length=0.1385 tendon_slack_length=0.132
        pennation_angle_at_optimal=0.4363323 max_contraction_velocity=0 time_scale=0.1 activation1=7.667
        activation2=1.459854 damping=0.017
      PathPoint P1: humerus (0.01269 -0.04375 0.0075)
      MovingPathPoint default: humerus socket_x_coordinate=/jointset/shoulder1/shoulder_elv
          socket_y_coordinate=/jointset/shoulder1/shoulder_elv socket_z_coordinate=/jointset/shoulder1/shoulder_elv
          y_location=PiecewiseLinearFunction(x=0 3.13149, y=-0.05157 -0.040096)
        x_location: SimmSpline: x=(0 0.747517 3.14159) y=(0.01243 0.014912 0.01833)
        z_location: SimmSpline: x=(0 0.623056 2.29124 3.12533) y=(-0.01807 -0.008102 0.000123 -0.000324)
      MovingPathPoint default_0: thorax socket_x_coordinate=/jointset/shoulder1/shoulder_elv
          socket_y_coordinate=/jointset/shoulder1/shoulder_elv socket_z_coordinate=/jointset/shoulder1/shoulder_elv
          x_location=PiecewiseLinearFunction(x=0 3.14159, y=0.02984 0.02984)
          z_location=PiecewiseLinearFunction(x=0 3.14159, y=0.1151 0.1151)
        y_location: SimmSpline: x=(0.0101016 1.59605 3.14159) y=(-0.070778 -0.059781 -0.0269)
      PathPoint P4: thorax (0.0525 -0.08417 0.08935)
      PathPoint P5: thorax (0.05724 -0.11654 0.03787)
      PathWrap: wrap_object=Thorax method=hybrid
      PathWrap pathwrap_0: wrap_object=PEC3hum method=hybrid range=(2 3)
      PathWrap pathwrap_1: wrap_object=PEC23hh method=hybrid
    Schutte1993Muscle_Deprecated LAT1: max_isometric_force=290.5 optimal_fiber_length=0.254 tendon_slack_length=0.12
        pennation_angle_at_optimal=0.4363323 max_contraction_velocity=0 time_scale=0.1 activation1=7.667
        activation2=1.459854 damping=0.017
      PathPoint P1: humerus (0.0105 -0.03415 -0.00653)
      MovingPathPoint default: scapula socket_x_coordinate=/jointset/shoulder1/shoulder_elv
          socket_y_coordinate=/jointset/shoulder1/shoulder_elv socket_z_coordinate=/jointset/shoulder1/shoulder_elv
          x_location=PiecewiseLinearFunction(x=0 3.14159, y=-0.07947 -0.08157)
          y_location=PiecewiseLinearFunction(x=0 3.14159, y=-0.08581 -0.05061)
          z_location=PiecewiseLinearFunction(x=0 3.14159, y=-0.02188 -0.03628)
      MovingPathPoint default_0: scapula socket_x_coordinate=/jointset/shoulder1/shoulder_elv
          socket_y_coordinate=/jointset/shoulder1/shoulder_elv socket_z_coordinate=/jointset/shoulder1/shoulder_elv
          x_location=PiecewiseLinearFunction(x=0 3.14159, y=-0.11215 -0.10635)
          y_location=PiecewiseLinearFunction(x=0 3.14159, y=-0.09779 -0.04699)
          z_location=PiecewiseLinearFunction(x=0 3.14159, y=-0.05322 -0.09522)
      PathPoint P4: thorax (-0.11828 -0.10118 0.03316)
      PathPoint P5: thorax (-0.09578 -0.11724 0.00882)
      PathWrap: wrap_object=TMAJ_LAThum method=hybrid
      PathWrap pathwrap_0: wrap_object=LAT_TMAJhh method=hybrid range=(1 2)
      PathWrap pathwrap_1: wrap_object=LAT_TMAJ2hh method=hybrid
    Schutte1993Muscle_Deprecated LAT2: max_isometric_force=317.5 optimal_fiber_length=0.2324 tendon_slack_length=0.1765
        pennation_angle_at_optimal=0.3316126 max_contraction_velocity=0 time_scale=0.1 activation1=7.667
        activation2=1.459854 damping=0.017
      PathPoint P1: humerus (0.00968 -0.04071 -0.00611)
      MovingPathPoint default: scapula socket_x_coordinate=/jointset/shoulder1/shoulder_elv
          socket_y_coordinate=/jointset/shoulder1/shoulder_elv socket_z_coordinate=/jointset/shoulder1/shoulder_elv
          x_location=PiecewiseLinearFunction(x=0 3.14159, y=-0.0764 -0.0905)
          y_location=PiecewiseLinearFunction(x=0 3.14159, y=-0.1022 -0.0717)
          z_location=PiecewiseLinearFunction(x=0 3.14159, y=-0.01808 -0.03098)
      MovingPathPoint default_0: scapula socket_x_coordinate=/jointset/shoulder1/shoulder_elv
          socket_y_coordinate=/jointset/shoulder1/shoulder_elv socket_z_coordinate=/jointset/shoulder1/shoulder_elv
          x_location=PiecewiseLinearFunction(x=0 3.14159, y=-0.10054 -0.12994)
          y_location=PiecewiseLinearFunction(x=0 3.14159, y=-0.13969 -0.07529)
          z_location=PiecewiseLinearFunction(x=0 3.14159, y=-0.05258 -0.12468)
      PathPoint P4: thorax (-0.10992 -0.16908 0.02878)
      PathPoint P5: thorax (-0.07186 -0.18818 0.00815)
      PathWrap: wrap_object=TMAJ_LAThum method=hybrid
      PathWrap pathwrap_0: wrap_object=LAT_TMAJhh method=hybrid range=(1 2)
      PathWrap pathwrap_1: wrap_object=LAT_TMAJ2hh method=hybrid
    Schutte1993Muscle_Deprecated LAT3: max_isometric_force=189 optimal_fiber_length=0.2789 tendon_slack_length=0.1403
        pennation_angle_at_optimal=0.3665191 max_contraction_velocity=0 time_scale=0.1 activation1=7.667
        activation2=1.459854 damping=0.017
      PathPoint P1: humerus (0.01208 -0.03922 -0.00416)
      MovingPathPoint default: scapula socket_x_coordinate=/jointset/shoulder1/shoulder_elv
          socket_y_coordinate=/jointset/shoulder1/shoulder_elv socket_z_coordinate=/jointset/shoulder1/shoulder_elv
          x_location=PiecewiseLinearFunction(x=0 3.14159, y=-0.05678 -0.11198)
          y_location=PiecewiseLinearFunction(x=0 3.14159, y=-0.13303 -0.09893)
          z_location=PiecewiseLinearFunction(x=0 3.14159, y=-0.0213 -0.0386)
      MovingPathPoint default_0: scapula socket_x_coordinate=/jointset/shoulder1/shoulder_elv
          socket_y_coordinate=/jointset/shoulder1/shoulder_elv socket_z_coordinate=/jointset/shoulder1/shoulder_elv
          x_location=PiecewiseLinearFunction(x=0 3.14159, y=-0.09449 -0.13109)
          y_location=PiecewiseLinearFunction(x=0 3.14159, y=-0.17553 -0.10113)
          z_location=PiecewiseLinearFunction(x=0 3.14159, y=-0.04406 -0.13416)
      PathPoint P4: thorax (-0.11157 -0.19387 0.05532)
      PathPoint P5: thorax (-0.07117 -0.24858 0.00907)
      PathWrap: wrap_object=TMAJ_LAThum method=hybrid
      PathWrap pathwrap_0: wrap_object=LAT_TMAJhh method=hybrid range=(1 2)
      PathWrap pathwrap_1: wrap_object=LAT_TMAJ2hh method=hybrid
    Schutte1993Muscle_Deprecated CORB: max_isometric_force=208.2 optimal_fiber_length=0.0932 tendon_slack_length=0.097
        pennation_angle_at_optimal=0.4712389 max_contraction_velocity=0 time_scale=0.1 activation1=7.667
        activation2=1.459854 damping=0.017
      PathPoint P1: scapula (0.0125 -0.04127 -0.02652)
      PathPoint P2: scapula (0.00483 -0.06958 -0.01563)
      PathPoint P3: humerus (0.00743 -0.15048 -0.00782)
      PathWrap: wrap_object=CORBhum method=hybrid
      PathWrap pathwrap_0: wrap_object=TMAJ_LAT_PEC_CORBhh method=hybrid
    Schutte1993Muscle_Deprecated TRIlong: max_isometric_force=771.8 optimal_fiber_length=0.134
        tendon_slack_length=0.143 pennation_angle_at_optimal=0.2094395 max_contraction_velocity=0 time_scale=0.1
        activation1=7.667 activation2=1.459854 damping=0.017
      PathPoint P1: scapula (-0.04565 -0.04073 -0.01377)
      PathPoint P2: humerus (-0.02714 -0.11441 -0.00664)
      PathPoint P3: humerus (-0.03184 -0.22637 -0.01217)
      PathPoint P4: humerus (-0.01743 -0.26757 -0.01208)
      PathPoint P5: ulna (-0.0219 0.01046 -0.00078)
      PathWrap: wrap_object=TRI method=hybrid
      PathWrap pathwrap_0: wrap_object=TRIlonghh method=hybrid
      PathWrap pathwrap_1: wrap_object=TRIlongglen method=hybrid
    Schutte1993Muscle_Deprecated TRIlat: max_isometric_force=717.5 optimal_fiber_length=0.1138
        tendon_slack_length=0.098 pennation_angle_at_optimal=0.1570796 max_contraction_velocity=0 time_scale=0.1
        activation1=7.667 activation2=1.459854 damping=0.017
      PathPoint P1: humerus (-0.00599 -0.12646 0.00428)
      PathPoint P2: humerus (-0.02344 -0.14528 0.00928)
      PathPoint P3: humerus (-0.03184 -0.22637 -0.01217)
      PathPoint P4: humerus (-0.01743 -0.26757 -0.01208)
      PathPoint P5: ulna (-0.0219 0.01046 -0.00078)
      PathWrap: wrap_object=TRI method=hybrid
    Schutte1993Muscle_Deprecated TRImed: max_isometric_force=717.5 optimal_fiber_length=0.1138
        tendon_slack_length=0.0908 pennation_angle_at_optimal=0.1570796 max_contraction_velocity=0 time_scale=0.1
        activation1=7.667 activation2=1.459854 damping=0.017
      PathPoint P1: humerus (-0.00838 -0.13695 -0.00906)
      PathPoint P2: humerus (-0.02601 -0.15139 -0.0108)
      PathPoint P3: humerus (-0.03184 -0.22637 -0.01217)
      PathPoint P4: humerus (-0.01743 -0.26757 -0.01208)
      PathPoint P5: ulna (-0.0219 0.01046 -0.00078)
      PathWrap: wrap_object=TRI method=hybrid
    Schutte1993Muscle_Deprecated ANC: max_isometric_force=283.2 optimal_fiber_length=0.027 tendon_slack_length=0.018
        pennation_angle_at_optimal=0 max_contraction_velocity=0 time_scale=0.1 activation1=7.667 activation2=1.459854
        damping=0.017
      PathPoint P1: humerus (-0.00744 -0.28359 0.00979)
      PathPoint P2: ulna (-0.02532 -0.00124 0.006)
      PathWrap: wrap_object=ANC method=hybrid
    Schutte1993Muscle_Deprecated SUP: max_isometric_force=379.6 optimal_fiber_length=0.033 tendon_slack_length=0.028
        pennation_angle_at_optimal=0 max_contraction_velocity=0 time_scale=0.1 activation1=7.667 activation2=1.459854
        damping=0.017
      PathPoint P1: radius (0.00996 -0.06096 0.00075)
      PathPoint P2: radius (0.01201 -0.0517 -0.00107)
      PathPoint P3: ulna (-0.0136 -0.03384 0.02013)
      PathWrap: wrap_object=SUP method=hybrid
    Schutte1993Muscle_Deprecated BIClong: max_isometric_force=525.1 optimal_fiber_length=0.1157
        tendon_slack_length=0.2723 pennation_angle_at_optimal=0 max_contraction_velocity=0 time_scale=0.1
        activation1=7.667 activation2=1.459854 damping=0.017
      PathPoint P1: scapula (-0.03123 -0.02353 -0.01305)
      PathPoint P2: scapula (-0.02094 -0.01309 -0.00461)
      PathPoint P3: humerus (0.02131 0.01793 0.01028)
      PathPoint P4: humerus (0.02378 -0.00511 0.01201)
      PathPoint P5: humerus (0.01345 -0.02827 0.00136)
      PathPoint P6: humerus (0.01068 -0.07736 -0.00165)
      PathPoint P7: humerus (0.01703 -0.12125 0.00024)
      PathPoint P8: humerus (0.0228 -0.1754 -0.0063)
      MovingPathPoint default: radius socket_x_coordinate=/jointset/radioulnar/pro_sup
          socket_y_coordinate=/jointset/radioulnar/pro_sup socket_z_coordinate=/jointset/radioulnar/pro_sup
        x_location: SimmSpline: x=(-1.57561 1.57823) y=(-0.0055 0.01096)
        y_location: PiecewiseLinearFunction: x=(-1.57561 0 1.57561) y=(-0.0282 -0.035 -0.0392)
        z_location: SimmSpline: x=(-1.57561 0.0866167 1.57561) y=(-0.01 -0.01358 -0.01083)
      PathPoint P11: radius (-0.002 -0.0375 -0.002)
      PathWrap: wrap_object=Elbow_BIC_BRD method=hybrid
      PathWrap pathwrap_0: wrap_object=BIClong method=hybrid range=(2 5)
    Schutte1993Muscle_Deprecated BICshort: max_isometric_force=316.8 optimal_fiber_length=0.1321
        tendon_slack_length=0.1923 pennation_angle_at_optimal=0 max_contraction_velocity=0 time_scale=0.1
        activation1=7.667 activation2=1.459854 damping=0.017
      PathPoint P1: scapula (0.01268 -0.03931 -0.02625)
      PathPoint P2: scapula (0.00093 -0.06704 -0.01593)
      PathPoint P3: humerus (0.01117 -0.07576 -0.01101)
      PathPoint P4: humerus (0.01703 -0.12125 -0.01079)
      PathPoint P5: humerus (0.0228 -0.1754 -0.0063)
      MovingPathPoint default: radius socket_x_coordinate=/jointset/radioulnar/pro_sup
          socket_y_coordinate=/jointset/radioulnar/pro_sup socket_z_coordinate=/jointset/radioulnar/pro_sup
        x_location: SimmSpline: x=(-1.57561 1.57823) y=(-0.0055 0.01096)
        y_location: PiecewiseLinearFunction: x=(-1.57561 0 1.57561) y=(-0.0282 -0.035 -0.0392)
        z_location: SimmSpline: x=(-1.57561 0.0866167 1.57561) y=(-0.01 -0.01358 -0.01083)
      PathPoint P8: radius (-0.002 -0.0375 -0.002)
      PathWrap: wrap_object=Elbow_BIC_BRD method=hybrid
    Schutte1993Muscle_Deprecated BRA: max_isometric_force=1177.37 optimal_fiber_length=0.0858
        tendon_slack_length=0.0535 pennation_angle_at_optimal=0 max_contraction_velocity=0 time_scale=0.1
        activation1=7.667 activation2=1.459854 damping=0.017
      PathPoint P1: humerus (0.0068 -0.1739 -0.0036)
      ConditionalPathPoint P2: humerus (0.01894 -0.28559 -0.01105) socket_coordinate=/jointset/elbow/elbow_flexion
          range=(0 0.813149) [radians]
      ConditionalPathPoint P3: ulna (0.00498 -0.01463 0.00128) socket_coordinate=/jointset/elbow/elbow_flexion
          range=(0 0.813149)
      PathPoint P4: ulna (-0.0032 -0.0239 0.0009)
    Schutte1993Muscle_Deprecated BRD: max_isometric_force=276 optimal_fiber_length=0.1726 tendon_slack_length=0.133
        pennation_angle_at_optimal=0 max_contraction_velocity=0 time_scale=0.1 activation1=7.667 activation2=1.459854
        damping=0.017
      PathPoint P1: humerus (-0.0098 -0.19963 0.00223)
      PathPoint P2: radius (0.03577 -0.12742 0.02315)
      PathPoint P3: radius (0.0419 -0.221 0.0224)
      PathWrap: wrap_object=Elbow_BIC_BRD method=hybrid
    Schutte1993Muscle_Deprecated ECRL: max_isometric_force=337.3 optimal_fiber_length=0.081 tendon_slack_length=0.244
        pennation_angle_at_optimal=0 max_contraction_velocity=0 time_scale=0.1 activation1=7.667 activation2=1.459854
        damping=0.017
      PathPoint P1: humerus (-0.0073 -0.2609 0.0091)
      PathPoint P2: radius (0.03195 -0.13463 0.02779)
      PathPoint P3: radius (0.04243 -0.23684 0.0362)
      PathPoint P4: hand (0.01717 -0.02122 0.00583)
      PathWrap: wrap_object=Elbow_PT_ECRL method=hybrid
      PathWrap pathwrap_0: wrap_object=ECRL method=hybrid
    Schutte1993Muscle_Deprecated ECRB: max_isometric_force=252.5 optimal_fiber_length=0.0585 tendon_slack_length=0.2223
        pennation_angle_at_optimal=0.1570796 max_contraction_velocity=0 time_scale=0.1 activation1=7.667
        activation2=1.459854 damping=0.017
      PathPoint P1: humerus (0.01349 -0.29048 0.01698)
      PathPoint P2: radius (0.02905 -0.13086 0.02385)
      PathPoint P3: radius (0.03549 -0.22805 0.03937)
      PathPoint P4: hand (0.005 -0.01136 0.0085)
      PathWrap: wrap_object=ECRB method=hybrid
    Schutte1993Muscle_Deprecated ECU: max_isometric_force=192.9 optimal_fiber_length=0.0622 tendon_slack_length=0.2285
        pennation_angle_at_optimal=0.0698132 max_contraction_velocity=0 time_scale=0.1 activation1=7.667
        activation2=1.459854 damping=0.017
      PathPoint P1: humerus (0.00083 -0.28955 0.0188)
      PathPoint P2: ulna (-0.01391 -0.03201 0.02947)
      PathPoint P3: ulna (-0.01705 -0.05428 0.02868)
      PathPoint P4: ulna (-0.01793 -0.09573 0.03278)
      PathPoint P5: radius (-0.01421 -0.22696 0.03481)
      PathPoint P6: hand (-0.02251 -0.01401 -0.00128)
      PathWrap: wrap_object=ECU method=hybrid
    Schutte1993Muscle_Deprecated FCR: max_isometric_force=407.9 optimal_fiber_length=0.0628 tendon_slack_length=0.244
        pennation_angle_at_optimal=0.0523599 max_contraction_velocity=0 time_scale=0.1 activation1=7.667
        activation2=1.459854 damping=0.017
      PathPoint P1: humerus (0.00758 -0.27806 -0.03705)
      PathPoint P2: radius (0.0211 -0.21943 0.00127)
      PathPoint P3: hand (0.01124 -0.01844 -0.00418)
      PathWrap: wrap_object=Elbow_PT_ECRL method=hybrid
      PathWrap pathwrap_0: wrap_object=FCR method=hybrid
    Schutte1993Muscle_Deprecated FCU: max_isometric_force=479.8 optimal_fiber_length=0.0509 tendon_slack_length=0.265
        pennation_angle_at_optimal=0.2094395 max_contraction_velocity=0 time_scale=0.1 activation1=7.667
        activation2=1.459854 damping=0.017
      PathPoint P1: humerus (0.00219 -0.2774 -0.0388)
      MovingPathPoint P2: radius socket_x_coordinate=/jointset/radioulnar/pro_sup
          socket_y_coordinate=/jointset/radioulnar/pro_sup socket_z_coordinate=/jointset/radioulnar/pro_sup
        x_location: SimmSpline: x=(-1.5708 0 1.5708) y=(0.00279 0.00949 0.01869)
        y_location: SimmSpline: x=(-1.5708 0 1.5708) y=(-0.1838 -0.1841 -0.1821)
        z_location: SimmSpline: x=(-1.5708 0 1.5708) y=(0.0069 0.0005 0.0002)
      PathPoint P3: radius (0.01082 -0.22327 0.00969)
      PathPoint P4: hand (-0.02036 -0.01765 -0.00752)
      PathWrap: wrap_object=FCU method=hybrid
      PathWrap pathwrap_0: wrap_object=Elbow_PT_ECRL method=hybrid
    Schutte1993Muscle_Deprecated PL: max_isometric_force=101 optimal_fiber_length=0.0638 tendon_slack_length=0.2694
        pennation_angle_at_optimal=0.06981317 max_contraction_velocity=0 time_scale=0.1 activation1=7.667
        activation2=1.459854 damping=0.017
      PathPoint P1: humerus (0.00457 -0.27519 -0.03865)
      PathPoint P2: radius (0.02531 -0.23915 -0.00276)
      PathPoint P3: hand (0.00917 -0.01898 -0.01754)
      PathPoint P4: hand (0.00227 -0.03096 0.00493)
      PathWrap: wrap_object=PL method=hybrid
      PathWrap pathwrap_0: wrap_object=Elbow_PT_ECRL method=hybrid
    Schutte1993Muscle_Deprecated PT: max_isometric_force=557.2 optimal_fiber_length=0.0492 tendon_slack_length=0.098
        pennation_angle_at_optimal=0.1745329 max_contraction_velocity=0 time_scale=0.1 activation1=7.667
        activation2=1.459854 damping=0.017
      PathPoint P1: humerus (0.0036 -0.2759 -0.0365)
      PathPoint P2: ulna (0.00846 -0.03373 -0.01432)
      MovingPathPoint P3: ulna socket_x_coordinate=/jointset/radioulnar/pro_sup
          socket_y_coordinate=/jointset/radioulnar/pro_sup socket_z_coordinate=/jointset/radioulnar/pro_sup
        x_location: PiecewiseLinearFunction: x=(-1.5708 1.5708) y=(0.01884 0.00554)
        y_location: SimmSpline: x=(-1.5708 1.5708) y=(-0.06086 -0.06946)
        z_location: SimmSpline: x=(-1.5708 1.5708) y=(0.00506 -0.00944)
      ConditionalPathPoint P4: radius (0.0236 -0.0934 0.0094) socket_coordinate=/jointset/radioulnar/pro_sup
          range=(-1.5708 0.509636)
      PathPoint P5: radius (0.0254 -0.1088 0.0198)
      PathWrap: wrap_object=Elbow_PT_ECRL method=hybrid
    Schutte1993Muscle_Deprecated PQ: max_isometric_force=284.7 optimal_fiber_length=0.0282 tendon_slack_length=0.005
        pennation_angle_at_optimal=0.1745329 max_contraction_velocity=0 time_scale=0.1 activation1=7.667
        activation2=1.459854 damping=0.017
      PathPoint P1: radius (0.03245 -0.19998 0.01962)
      PathPoint P2: ulna (0.00193 -0.20972 0.03632)
      PathWrap: wrap_object=PQ2 method=hybrid
      PathWrap pathwrap_0: wrap_object=PQ1 method=hybrid
    Schutte1993Muscle_Deprecated FDSL: max_isometric_force=75.3 optimal_fiber_length=0.0515 tendon_slack_length=0.3386
        pennation_angle_at_optimal=0.08726646 max_contraction_velocity=0 time_scale=0.1 activation1=7.667
        activation2=1.459854 damping=0.017
      PathPoint P1: humerus (0.00421 -0.27598 -0.03864)
      PathPoint P2: radius (0.01377 -0.18718 0.00205)
      PathPoint P3: hand (-0.00235 -0.01393 -0.01376)
      PathPoint P4: hand (-0.01995 -0.04281 -0.00742)
      PathPoint P5: hand (-0.02044 -0.05981 -0.01878)
      PathPoint P6: hand (-0.01713 -0.07245 -0.02753)
      PathPoint P7: hand (-0.01156 -0.07271 -0.03656)
      PathPoint P8: hand (-0.01059 -0.07271 -0.03796)
      PathWrap: wrap_object=FDS method=hybrid
      PathWrap pathwrap_0: wrap_object=Elbow_PT_ECRL method=hybrid
      PathWrap pathwrap_1: wrap_object=_5rdmcp_FDS method=hybrid range=(4 5)
      PathWrap pathwrap_2: wrap_object=Fifthpm_FDS method=hybrid range=(6 7)
    Schutte1993Muscle_Deprecated FDSR: max_isometric_force=171.2 optimal_fiber_length=0.0736 tendon_slack_length=0.328
        pennation_angle_at_optimal=0.06981317 max_contraction_velocity=0 time_scale=0.1 activation1=7.667
        activation2=1.459854 damping=0.017
      PathPoint P1: humerus (0.00479 -0.2788 -0.03731)
      PathPoint P2: radius (0.01571 -0.18666 0.00267)
      PathPoint P3: hand (-0.00082 -0.01344 -0.01359)
      PathPoint P4: hand (-0.00977 -0.05179 4e-5)
      PathPoint P5: hand (-0.01323 -0.0667 -0.0102)
      PathPoint P6: hand (-0.00788 -0.08027 -0.02503)
      PathPoint P7: hand (-0.00299 -0.08125 -0.03395)
      PathPoint P8: hand (0.00062 -0.08092 -0.03892)
      PathWrap: wrap_object=FDS method=hybrid
      PathWrap pathwrap_0: wrap_object=Elbow_PT_ECRL method=hybrid
      PathWrap pathwrap_1: wrap_object=_4rdmcp_FDS method=hybrid range=(4 5)
      PathWrap pathwrap_2: wrap_object=Fourthpm_FDS method=hybrid range=(6 7)
    Schutte1993Muscle_Deprecated FDSM: max_isometric_force=258.8 optimal_fiber_length=0.0749 tendon_slack_length=0.295
        pennation_angle_at_optimal=0.1221731 max_contraction_velocity=0 time_scale=0.1 activation1=7.667
        activation2=1.459854 damping=0.017
      PathPoint P1: ulna (-0.00669 -0.02713 -0.00191)
      PathPoint P2: radius (0.01899 -0.18706 0.00424)
      PathPoint P3: hand (0.0068 -0.01377 -0.01399)
      PathPoint P4: hand (0.00471 -0.03332 -0.00132)
      PathPoint P5: hand (0.00542 -0.0566 0.0006)
      PathPoint P6: hand (0.00555 -0.07224 -0.00338)
      PathPoint P7: hand (0.01167 -0.0881 -0.0167)
      PathPoint P8: hand (0.01301 -0.0887 -0.02977)
      PathPoint P9: hand (0.01568 -0.08577 -0.03765)
      PathWrap: wrap_object=FDS method=hybrid
      PathWrap pathwrap_0: wrap_object=_3rdmcp_FDS method=hybrid range=(5 6)
      PathWrap pathwrap_1: wrap_object=Thirdpm_FDS method=hybrid range=(7 8)
    Schutte1993Muscle_Deprecated FDSI: max_isometric_force=162.5 optimal_fiber_length=0.0835 tendon_slack_length=0.275
        pennation_angle_at_optimal=0.1047198 damping=0.017
      PathPoint P1: ulna (-0.00676 -0.02819 -0.00137)
      PathPoint P2: radius (0.02145 -0.18623 0.00552)
      PathPoint P3: hand (0.00889 -0.01366 -0.01387)
      PathPoint P4: hand (0.01061 -0.03787 0.00024)
      PathPoint P5: hand (0.01782 -0.05108 0.00418)
      PathPoint P6: hand (0.01849 -0.07297 -0.00375)
      PathPoint P7: hand (0.02678 -0.08714 -0.01804)
      PathPoint P8: hand (0.02667 -0.0874 -0.02678)
      PathPoint P9: hand (0.0266 -0.08633 -0.02903)
      PathWrap: wrap_object=FDS method=hybrid
      PathWrap pathwrap_0: wrap_object=_2rdmcp_FDS method=hybrid range=(5 6)
      PathWrap pathwrap_1: wrap_object=Secondpm_FDS method=hybrid range=(7 8)
    Schutte1993Muscle_Deprecated FDPL: max_isometric_force=236.8 optimal_fiber_length=0.0749 tendon_slack_length=0.2819
        pennation_angle_at_optimal=0.1396263 damping=0.017
      PathPoint P1: ulna (-0.00628 -0.03214 0.00254)
      PathPoint P2: radius (0.01409 -0.18516 0.00861)
      PathPoint P3: hand (-0.00088 -0.01027 -0.01188)
      PathPoint P4: hand (-0.01855 -0.04646 -0.00733)
      PathPoint P5: hand (-0.01808 -0.05841 -0.0156)
      PathPoint P6: hand (-0.01428 -0.07289 -0.02683)
      PathPoint P7: hand (-0.0092 -0.07483 -0.03684)
      PathPoint P8: hand (-0.00312 -0.07405 -0.04165)
      PathPoint P9: hand (0.00446 -0.07059 -0.04657)
      PathWrap: wrap_object=FDP method=hybrid
      PathWrap pathwrap_0: wrap_object=_5rdmcp_FDP method=hybrid range=(4 5)
      PathWrap pathwrap_1: wrap_object=Fifthpm_FDP method=hybrid range=(6 7)
      PathWrap pathwrap_2: wrap_object=Fifthmd_flex method=hybrid range=(8 9)
    Schutte1993Muscle_Deprecated FDPR: max_isometric_force=172.9 optimal_fiber_length=0.0798 tendon_slack_length=0.2915
        pennation_angle_at_optimal=0.1221731 max_contraction_velocity=0 time_scale=0.1 activation1=7.667
        activation2=1.459854 damping=0.017
      PathPoint P1: ulna (-0.00502 -0.03374 0.00273)
      PathPoint P2: radius (0.0158 -0.18629 0.00803)
      PathPoint P3: hand (0.00106 -0.01177 -0.01184)
      PathPoint P4: hand (-0.00855 -0.05542 0.00088)
      PathPoint P5: hand (-0.01079 -0.06588 -0.00817)
      PathPoint P6: hand (-0.00547 -0.08154 -0.02256)
      PathPoint P7: hand (-0.00056 -0.0823 -0.03367)
      PathPoint P8: hand (0.00609 -0.07837 -0.04238)
      PathPoint P9: hand (0.01211 -0.0738 -0.04858)
      PathWrap: wrap_object=FDP method=hybrid
      PathWrap pathwrap_0: wrap_object=_4rdmcp_FDP method=hybrid range=(4 5)
      PathWrap pathwrap_1: wrap_object=Fourthpm_FDP method=hybrid range=(6 7)
      PathWrap pathwrap_2: wrap_object=Fourthmd_flex method=hybrid range=(8 9)
    Schutte1993Muscle_Deprecated FDPM: max_isometric_force=212.4 optimal_fiber_length=0.0835 tendon_slack_length=0.303
        pennation_angle_at_optimal=0.1047198 max_contraction_velocity=0 time_scale=0.1 activation1=7.667
        activation2=1.459854 damping=0.017
      PathPoint P1: ulna (-0.00522 -0.03327 0.0021)
      PathPoint P2: radius (0.01906 -0.18644 0.00785)
      PathPoint P3: hand (0.00335 -0.0128 -0.01144)
      PathPoint P4: hand (0.00302 -0.03447 -0.00611)
      PathPoint P5: hand (0.00252 -0.05863 0.00122)
      PathPoint P6: hand (0.00285 -0.06985 -0.00133)
      PathPoint P7: hand (0.00863 -0.08779 -0.01815)
      PathPoint P8: hand (0.01002 -0.08766 -0.02964)
      PathPoint P9: hand (0.01633 -0.08157 -0.04435)
      PathPoint P10: hand (0.01909 -0.07663 -0.05229)
      PathWrap: wrap_object=FDP method=hybrid
      PathWrap pathwrap_0: wrap_object=_3rdmcp_FDP method=hybrid range=(5 6)
      PathWrap pathwrap_1: wrap_object=Thirdpm_FDP method=hybrid range=(7 8)
      PathWrap pathwrap_2: wrap_object=Thirdmd_flex method=hybrid range=(9 10)
    Schutte1993Muscle_Deprecated FDPI: max_isometric_force=197.3 optimal_fiber_length=0.0749 tendon_slack_length=0.3015
        pennation_angle_at_optimal=0.1221731 max_contraction_velocity=0 time_scale=0.1 activation1=7.667
        activation2=1.459854 damping=0.017
      PathPoint P1: ulna (-0.00647 -0.03176 0.0028)
      PathPoint P2: radius (0.0208 -0.1856 0.00915)
      PathPoint P3: hand (0.00896 -0.01168 -0.01212)
      PathPoint P4: hand (0.01922 -0.05542 0.00438)
      PathPoint P5: hand (0.02073 -0.07021 -0.00286)
      PathPoint P6: hand (0.02904 -0.08588 -0.01782)
      PathPoint P7: hand (0.02924 -0.08672 -0.02769)
      PathPoint P8: hand (0.02914 -0.08235 -0.03979)
      PathPoint P9: hand (0.02847 -0.07771 -0.04766)
      PathWrap: wrap_object=FDP method=hybrid
      PathWrap pathwrap_0: wrap_object=_2rdmcp_FDP method=hybrid range=(4 5)
      PathWrap pathwrap_1: wrap_object=Secondpm_FDP method=hybrid range=(6 7)
      PathWrap pathwrap_2: wrap_object=Secondmd_flex method=hybrid range=(8 9)
    Schutte1993Muscle_Deprecated EDCL: max_isometric_force=39.4 optimal_fiber_length=0.065 tendon_slack_length=0.335
        pennation_angle_at_optimal=0.03490659 max_contraction_velocity=0 time_scale=0.1 activation1=7.667
        activation2=1.459854 damping=0.017
      PathPoint P1: humerus (-0.0004 -0.28831 0.0187)
      MovingPathPoint P2: radius socket_x_coordinate=/jointset/radioulnar/pro_sup
          socket_y_coordinate=/jointset/radioulnar/pro_sup socket_z_coordinate=/jointset/radioulnar/pro_sup
        x_location: SimmSpline: x=(-1.5708 0 1.5708) y=(0.0121 0.0013 -0.0095)
        y_location: SimmSpline: x=(-1.5708 0 1.5708) y=(-0.04018 -0.03888 -0.03508)
        z_location: SimmSpline: x=(-1.5708 0 1.5708) y=(0.01055 0.01405 0.01316)
      PathPoint P3: radius (0.00993 -0.22304 0.03618)
      PathPoint P4: hand (-0.02464 -0.04402 0.00169)
      PathPoint P5: hand (-0.02381 -0.04734 0.00077)
      PathPoint P6: hand (-0.02395 -0.06613 -0.01001)
      PathPoint P7: hand (-0.01798 -0.07847 -0.02711)
      PathPoint P8: hand (-0.01178 -0.07877 -0.03779)
      PathPoint P9: hand (-0.0015 -0.07586 -0.04586)
      PathPoint P10: hand (0.00201 -0.07487 -0.04794)
      PathWrap: wrap_object=EDCL method=hybrid range=(3 4)
      PathWrap pathwrap_0: wrap_object=_5rdmcp_ext method=hybrid range=(5 6)
      PathWrap pathwrap_1: wrap_object=Fifthpm_ext method=hybrid range=(7 8)
      PathWrap pathwrap_2: wrap_object=Fifthmd_ext method=hybrid range=(9 10)
    Schutte1993Muscle_Deprecated EDCR: max_isometric_force=109.2 optimal_fiber_length=0.0626 tendon_slack_length=0.365
        pennation_angle_at_optimal=0.05235988 max_contraction_velocity=0 time_scale=0.1 activation1=7.667
        activation2=1.459854 damping=0.017
      PathPoint P1: humerus (-0.00156 -0.28936 0.01782)
      MovingPathPoint P2: radius socket_x_coordinate=/jointset/radioulnar/pro_sup
          socket_y_coordinate=/jointset/radioulnar/pro_sup socket_z_coordinate=/jointset/radioulnar/pro_sup
        x_location: SimmSpline: x=(-1.5708 0 1.5708) y=(0.0134 0.0026 -0.0082)
        y_location: SimmSpline: x=(-1.5708 0 1.5708) y=(-0.04121 -0.03991 -0.03611)
        z_location: SimmSpline: x=(-1.5708 0 1.5708) y=(0.01202 0.01552 0.01463)
      PathPoint P3: radius (0.00882 -0.22366 0.04284)
      PathPoint P4: hand (-0.01564 -0.0555 0.00934)
      PathPoint P5: hand (-0.01427 -0.05819 0.01161)
      PathPoint P6: hand (-0.0158 -0.07216 -0.00421)
      PathPoint P7: hand (-0.00825 -0.08735 -0.0226)
      PathPoint P8: hand (-0.00272 -0.08806 -0.03409)
      PathPoint P9: hand (0.00763 -0.08026 -0.04658)
      PathPoint P10: hand (0.01069 -0.07809 -0.04941)
      PathWrap: wrap_object=EDCR method=hybrid
      PathWrap pathwrap_0: wrap_object=_4rdmcp_ext method=hybrid range=(5 6)
      PathWrap pathwrap_1: wrap_object=Fourthpm_ext method=hybrid range=(7 8)
      PathWrap pathwrap_2: wrap_object=Fourthmd_ext method=hybrid range=(9 10)
    Schutte1993Muscle_Deprecated EDCM: max_isometric_force=94.4 optimal_fiber_length=0.0724 tendon_slack_length=0.365
        pennation_angle_at_optimal=0.05235988 max_contraction_velocity=0 time_scale=0.1 activation1=7.667
        activation2=1.459854 damping=0.017
      PathPoint P1: humerus (0.00051 -0.28984 0.01949)
      MovingPathPoint P2: radius socket_x_coordinate=/jointset/radioulnar/pro_sup
          socket_y_coordinate=/jointset/radioulnar/pro_sup socket_z_coordinate=/jointset/radioulnar/pro_sup
        x_location: SimmSpline: x=(-1.5708 0 1.5708) y=(0.01396 0.00316 -0.00764)
        y_location: SimmSpline: x=(-1.5708 0 1.5708) y=(-0.04078 -0.03948 -0.03568)
        z_location: SimmSpline: x=(-1.5708 0 1.5708) y=(0.01178 0.01528 0.01439)
      PathPoint P3: radius (0.0144 -0.22323 0.04223)
      PathPoint P4: hand (0.00039 -0.05274 0.01491)
      PathPoint P5: hand (-0.00087 -0.05574 0.01452)
      PathPoint P6: hand (0.00186 -0.07718 0.00597)
      PathPoint P7: hand (0.01007 -0.09313 -0.01774)
      PathPoint P8: hand (0.01321 -0.09558 -0.03056)
      PathPoint P9: hand (0.01857 -0.08525 -0.04759)
      PathPoint P10: hand (0.02056 -0.07993 -0.05341)
      PathPoint P11: hand (0.02195 -0.07701 -0.05663)
      PathWrap: wrap_object=EDCM method=hybrid range=(1 4)
      PathWrap pathwrap_0: wrap_object=Thirdmd_ext method=hybrid range=(9 10)
      PathWrap pathwrap_1: wrap_object=Thirdpm_ext method=hybrid range=(7 8)
      PathWrap pathwrap_2: wrap_object=_3rdmcp_ext method=hybrid range=(5 6)
    Schutte1993Muscle_Deprecated EDCI: max_isometric_force=48.8 optimal_fiber_length=0.07 tendon_slack_length=0.365
        pennation_angle_at_optimal=0.05235988 max_contraction_velocity=0 time_scale=0.1 activation1=7.667
        activation2=1.459854 damping=0.017
      PathPoint P1: humerus (0.00065 -0.28898 0.01869)
      MovingPathPoint P2: radius socket_x_coordinate=/jointset/radioulnar/pro_sup
          socket_y_coordinate=/jointset/radioulnar/pro_sup socket_z_coordinate=/jointset/radioulnar/pro_sup
        x_location: SimmSpline: x=(-1.5708 0 1.5708) y=(0.01308 0.00228 -0.00852)
        y_location: SimmSpline: x=(-1.5708 0 1.5708) y=(-0.04048 -0.03918 -0.03538)
        z_location: SimmSpline: x=(-1.5708 0 1.5708) y=(0.01133 0.01483 0.01394)
      PathPoint P3: radius (0.01533 -0.22314 0.04196)
      PathPoint P4: hand (0.01543 -0.0468 0.01639)
      PathPoint P5: hand (0.01897 -0.05654 0.01438)
      PathPoint P6: hand (0.01994 -0.07678 0.00594)
      PathPoint P7: hand (0.02945 -0.09162 -0.01245)
      PathPoint P8: hand (0.03121 -0.09349 -0.02905)
      PathPoint P9: hand (0.03013 -0.08487 -0.04268)
      PathPoint P10: hand (0.02929 -0.08103 -0.04966)
      PathWrap: wrap_object=EDCI method=hybrid range=(3 4)
      PathWrap pathwrap_0: wrap_object=_2rdmcp_ext method=hybrid range=(5 6)
      PathWrap pathwrap_1: wrap_object=Secondpm_ext method=hybrid range=(7 8)
      PathWrap pathwrap_2: wrap_object=Secondmd_ext method=hybrid range=(9 10)
    Schutte1993Muscle_Deprecated EDM: max_isometric_force=72.4 optimal_fiber_length=0.0675 tendon_slack_length=0.335
        pennation_angle_at_optimal=0.05235988 max_contraction_velocity=0 time_scale=0.1 activation1=7.667
        activation2=1.459854 damping=0.017
      PathPoint P1: humerus (0.00089 -0.28919 0.01847)
      PathPoint P2: ulna (-0.00977 -0.03907 0.03085)
      PathPoint P3: ulna (-0.00755 -0.08267 0.03646)
      PathPoint P4: radius (0.00454 -0.22641 0.03678)
      PathPoint P5: hand (-0.02059 -0.01032 0.00372)
      PathPoint P6: hand (-0.02563 -0.04722 0.00023)
      PathPoint P7: hand (-0.02549 -0.06511 -0.01098)
      PathPoint P8: hand (-0.01933 -0.0781 -0.02718)
      PathPoint P9: hand (-0.01346 -0.07892 -0.03894)
      PathPoint P10: hand (-0.00216 -0.07521 -0.04589)
      PathPoint P11: hand (0.00132 -0.07345 -0.04803)
      PathWrap: wrap_object=EDM method=hybrid range=(4 5)
      PathWrap pathwrap_0: wrap_object=Fifthmd_ext method=hybrid range=(10 11)
      PathWrap pathwrap_1: wrap_object=Fifthpm_ext method=hybrid range=(8 9)
      PathWrap pathwrap_2: wrap_object=_5rdmcp_ext method=hybrid range=(6 7)
    Schutte1993Muscle_Deprecated EIP: max_isometric_force=47.3 optimal_fiber_length=0.0589 tendon_slack_length=0.21
        pennation_angle_at_optimal=0.1047198 max_contraction_velocity=0 time_scale=0.1 activation1=7.667
        activation2=1.459854 damping=0.017
      PathPoint P1: ulna (-0.00394 -0.16652 0.03682)
      PathPoint P2: ulna (0.00171 -0.17469 0.04049)
      PathPoint P3: radius (0.01076 -0.22783 0.03664)
      PathPoint P4: hand (0.00388 -0.02234 0.01184)
      PathPoint P5: hand (0.01693 -0.0564 0.01377)
      PathPoint P6: hand (0.01735 -0.07692 0.00581)
      PathPoint P7: hand (0.02765 -0.09314 -0.01511)
      PathPoint P8: hand (0.02879 -0.09437 -0.02823)
      PathPoint P9: hand (0.0287 -0.08524 -0.04295)
      PathPoint P10: hand (0.02834 -0.07785 -0.05501)
      PathWrap: wrap_object=Extensor_ellipse method=hybrid
      PathWrap pathwrap_0: wrap_object=_2rdmcp_ext method=hybrid range=(5 6)
      PathWrap pathwrap_1: wrap_object=Secondpm_ext method=hybrid range=(7 8)
      PathWrap pathwrap_2: wrap_object=Secondmd_ext method=hybrid range=(9 10)
    Schutte1993Muscle_Deprecated EPL: max_isometric_force=88.3 optimal_fiber_length=0.054 tendon_slack_length=0.2305
        pennation_angle_at_optimal=0.1047198 max_contraction_velocity=0 time_scale=0.1 activation1=7.667
        activation2=1.459854 damping=0.017
      PathPoint P1: ulna (-0.01412 -0.09706 0.02952)
      PathPoint P2: radius (0.00124 -0.13668 0.0227)
      PathPoint P3: radius (0.02702 -0.21872 0.03828)
      PathPoint P4: radius (0.03382 -0.22754 0.04607)
      PathPoint P5: radius (0.04234 -0.23771 0.04173)
      PathPoint P6: hand (0.02428 0.00014 0.00608)
      PathPoint P7: hand (0.02338 -0.00917 -0.00039)
      PathPoint P8: hand (0.02905 -0.01427 -0.00489)
      PathPoint P9: hand (0.04414 -0.03417 -0.01814)
      PathPoint P10: hand (0.04867 -0.04646 -0.02487)
      PathPoint P11: hand (0.04751 -0.0701 -0.03774)
      PathPoint P12: hand (0.04011 -0.07565 -0.04283)
      PathWrap: wrap_object=MPthumb method=hybrid
    Schutte1993Muscle_Deprecated EPB: max_isometric_force=46 optimal_fiber_length=0.0675 tendon_slack_length=0.1155
        pennation_angle_at_optimal=0.122173 max_contraction_velocity=0 time_scale=0.1 activation1=7.667
        activation2=1.459854 damping=0.017
      PathPoint P1: radius (0.01924 -0.14695 0.02114)
      PathPoint P2: radius (0.02276 -0.15857 0.02665)
      PathPoint P3: radius (0.03831 -0.19722 0.03834)
      PathPoint P4: radius (0.05235 -0.23611 0.02699)
      PathPoint P5: hand (0.03123 0.00256 -0.00327)
      PathPoint P6: hand (0.02972 -0.00794 -0.01436)
      PathPoint P7: hand (0.04422 -0.033 -0.02422)
      PathPoint P8: hand (0.04528 -0.04785 -0.03186)
      PathWrap: wrap_object=MPthumb method=hybrid
    Schutte1993Muscle_Deprecated FPL: max_isometric_force=201 optimal_fiber_length=0.0552 tendon_slack_length=0.197
        pennation_angle_at_optimal=0.1221731 max_contraction_velocity=0 time_scale=0.1 activation1=7.667
        activation2=1.459854 damping=0.017
      PathPoint P1: radius (0.00971 -0.09458 0.01769)
      PathPoint P2: radius (0.01658 -0.13525 0.01915)
      PathPoint P3: radius (0.01869 -0.17932 0.01988)
      PathPoint P4: radius (0.038 -0.23171 0.0158)
      MovingPathPoint P5: hand socket_x_coordinate=/jointset/radiocarpal/flexion
          socket_y_coordinate=/jointset/radiocarpal/flexion socket_z_coordinate=/jointset/radiocarpal/flexion
        x_location: SimmSpline: x=(-1.22173 0 1.22173) y=(0.01869 0.01869 0.01549)
        y_location: SimmSpline: x=(-1.22173 0 1.22173) y=(0.00882 0.00882 -0.00078)
        z_location: SimmSpline: x=(-1.22173 0 1.22173) y=(-0.01547 -0.01547 -0.02087)
      PathPoint P6: hand (0.01244 -0.02207 -0.02089)
      PathPoint P7: hand (0.01641 -0.02621 -0.02221)
      PathPoint P8: hand (0.02457 -0.03294 -0.02237)
      PathPoint P9: hand (0.02827 -0.05482 -0.03055)
      PathPoint P10: hand (0.03511 -0.06519 -0.03749)
      PathPoint P11: hand (0.03533 -0.07656 -0.04118)
      PathWrap: wrap_object=FPL method=hybrid
      PathWrap pathwrap_0: wrap_object=IPthumb method=hybrid range=(10 11)
      PathWrap pathwrap_1: wrap_object=MPthumb method=hybrid
    Schutte1993Muscle_Deprecated APL: max_isometric_force=116.7 optimal_fiber_length=0.0713 tendon_slack_length=0.1295
        pennation_angle_at_optimal=0.1396263 max_contraction_velocity=0 time_scale=0.1 activation1=7.667
        activation2=1.459854 damping=0.017
      PathPoint P1: radius (0.01154 -0.09477 0.01681)
      PathPoint P2: radius (0.0303 -0.1397 0.03507)
      PathPoint P3: radius (0.03993 -0.16072 0.034)
      PathPoint P4: radius (0.04397 -0.17845 0.03134)
      PathPoint P5: radius (0.05505 -0.23084 0.02368)
      MovingPathPoint P6: hand socket_x_coordinate=/jointset/radiocarpal/flexion
          socket_y_coordinate=/jointset/radiocarpal/flexion socket_z_coordinate=/jointset/radiocarpal/flexion
        x_location: SimmSpline: x=(-1.22173 0 1.22173) y=(0.03385 0.03385 0.03135)
        y_location: SimmSpline: x=(-1.22173 0 1.22173) y=(0.00634 0.00634 0.00534)
        z_location: SimmSpline: x=(-1.22173 0 1.22173) y=(-0.00745 -0.00745 -0.01245)
      PathPoint P7: hand (0.02587 0.00205 -0.0165)
      PathPoint P8: hand (0.02878 -0.00674 -0.0187)
      PathPoint P9: hand (0.03076 -0.01583 -0.01885)
  MarkerSet:
    Marker Thorax: thorax (0.08 -0.15 0)
    Marker Humerus: humerus (0 -0.15 0.04)
    Marker Radius: radius (0.02 -0.19 0.055)
